# OpenSim document version 40000
ForwardTool leg6dof9musc:
  replace_force_set: false
  results_directory: C:\Users\aleksi\Documents\OpenSim\4.0\Models\Leg6Dof9Musc\FWD_CMC
  output_precision: 8
  initial_time: 0.1466667
  final_time: 0.6066667
  solve_for_equilibrium_for_auxiliary_states: true
  maximum_number_of_integrator_steps: 20000
  maximum_integrator_step_size: 1
  minimum_integrator_step_size: 1e-8
  integrator_error_tolerance: 1e-5
  use_specified_dt: false
  ControllerSet Controllers:
    ControlSetController: controls_file=leg6dof9musc_controls.xml
