# OpenSim document version 40000
ForwardTool FDS:
  replace_force_set: false
  results_directory: .
  output_precision: 20
  initial_time: 0
  final_time: 1
  solve_for_equilibrium_for_auxiliary_states: false
  maximum_number_of_integrator_steps: 20000000
  maximum_integrator_step_size: 1
  minimum_integrator_step_size: 1e-5
  integrator_error_tolerance: 1e-5
  states_file: initial_states.sto
  use_specified_dt: false
  ControllerSet Controllers:
    ControlSetController: controls_file=fd_controls.sto
