# OpenSim document version 30000
ForwardTool FDS:
  model_file: ModelFiles/MoBL_ARMS_model.osim
  replace_force_set: false
  results_directory: output
  output_precision: 20
  initial_time: 0
  final_time: 0.998
  solve_for_equilibrium_for_auxiliary_states: false
  maximum_number_of_integrator_steps: 2000000000
  maximum_integrator_step_size: 1
  minimum_integrator_step_size: 1e-5
  integrator_error_tolerance: 1e-5
  states_file: initial_states.sto
  use_specified_dt: false
  AnalysisSet Analyses:
    Actuation: start_time=0 end_time=0.998 step_interval=1 in_degrees=false
  ControllerSet Controllers:
    ControlSetController: controls_file=controls.sto
