# OpenSim document version 10600
Model 7374_pre:
  credits: Model authors names..
  publications: List of publications related to model...
  length_units: meters
  force_units: N
  defaults: Thelen2003Muscle default: muscle_model=9 max_isometric_force=546 optimal_fiber_length=0.0535
      tendon_slack_length=0.078 pennation_angle=0 activation_time_constant=0.01 deactivation_time_constant=0.04 Vmax=10
      Vmax0=5 FmaxTendonStrain=0.033 FmaxMuscleStrain=0.6 KshapeActive=0.5 KshapePassive=4 damping=0.05 Af=0.3 Flen=1.8
  DynamicsEngine:
    SimbodyEngine default: gravity=(0 -9.80665 0)
      BodySet:
        Body ground: mass=0 mass_center=(0 0 0) inertia_xx=0 inertia_yy=0 inertia_zz=0 meshes=treadmill.vtp
        Body pelvis: mass=4.457461 mass_center=(-0.051611 0 0) inertia_xx=0.02073441 inertia_yy=0.01756777
            inertia_zz=0.01167823 meshes=(sacrum.vtp pelvis.vtp l_pelvis.vtp)
          CustomJoint ground_pelvis: parent_body=ground location_in_parent=(0 0 0) location=(0 0 0)
            Coordinate pelvis_tilt: default_value=0 initial_value=0 tolerance=0 stiffness=0 range=(-1.570796 1.570796)
                keys=q_key clamped=true restraint_active=false
            Coordinate pelvis_list: default_value=0 initial_value=0 tolerance=0 stiffness=0 range=(-1.570796 1.570796)
                keys=q_key clamped=true restraint_active=false
            Coordinate pelvis_rotation: default_value=0 initial_value=0 tolerance=0 stiffness=0
                range=(-1.570796 1.570796) keys=q_key clamped=true restraint_active=false
            Coordinate pelvis_tx: default_value=0 initial_value=0 tolerance=0 stiffness=0 range=(-5 5) keys=p_key
                clamped=true restraint_active=false
            Coordinate pelvis_ty: default_value=0.93 initial_value=0.93 tolerance=0 stiffness=0 range=(-1 2) keys=q_key
                clamped=true restraint_active=false
            Coordinate pelvis_tz: default_value=0 initial_value=0 tolerance=0 stiffness=0 range=(-3 3) keys=q_key
                clamped=true restraint_active=false
            TransformAxis tx: coordinate=pelvis_tx is_rotation=false axis=(1 0 0)
            TransformAxis ty: coordinate=pelvis_ty is_rotation=false axis=(0 1 0)
            TransformAxis tz: coordinate=pelvis_tz is_rotation=false axis=(0 0 1)
            TransformAxis r1: coordinate=pelvis_tilt axis=(0 0 1)
            TransformAxis r2: coordinate=pelvis_list axis=(1 0 0)
            TransformAxis r3: coordinate=pelvis_rotation axis=(0 1 0)
        Body femur_r: mass=3.568876 mass_center=(0 -0.1246662 0) inertia_xx=0.02762886 inertia_yy=0.00724252
            inertia_zz=0.02913514 meshes=femur.vtp
          CustomJoint hip_r: parent_body=pelvis location_in_parent=(-0.051611 -0.048253 0.060955) location=(0 0 0)
            Coordinate hip_flexion_r: default_value=0 initial_value=0 tolerance=0 stiffness=0
                range=(-2.094395 2.094395) keys=(h_key leftmouse_button) clamped=true restraint_active=false
            Coordinate hip_adduction_r: default_value=0 initial_value=0 tolerance=0 stiffness=0
                range=(-2.094395 2.094395) keys=(h_key leftmouse_button) clamped=true restraint_active=false
            Coordinate hip_rotation_r: default_value=0 initial_value=0 tolerance=0 stiffness=0
                range=(-2.094395 2.094395) keys=(h_key leftmouse_button) clamped=true restraint_active=false
            TransformAxis r1: coordinate=hip_flexion_r axis=(0 0 1)
            TransformAxis r2: coordinate=hip_adduction_r axis=(1 0 0)
            TransformAxis r3: coordinate=hip_rotation_r axis=(0 1 0)
        Body tibia_r: mass=1.281721 mass_center=(0 -0.1322372 0) inertia_xx=0.00874101 inertia_yy=0.00088451
            inertia_zz=0.00886242 meshes=(tibia.vtp fibula.vtp)
          CustomJoint knee_r: parent_body=femur_r location_in_parent=(0 0 0) location=(0 0 0)
            Coordinate knee_angle_r: default_value=0 initial_value=0 tolerance=0 stiffness=0
                range=(-2.094395 0.1745329) keys=k_key clamped=true restraint_active=false
            TransformAxis tx: coordinate=knee_angle_r is_rotation=false axis=(1 0 0)
              natCubicSpline: min_x=-1000000000000000000000000000000 max_x=1000000000000000000000000000000
                  min_y=-1000000000000000000000000000000 max_y=1000000000000000000000000000000
                  min_z=-1000000000000000000000000000000 max_z=1000000000000000000000000000000
                  x=(-2.094395 -1.745329 -1.396263 -1.047198 -0.6981317 -0.3490659 -0.1745329 0.1973442 0.337395 0.4901776 1.52146 2.094395)
                  y=(-0.00234666 0.00131266 0.00301399 0.00300665 0.00155466 -0.00073333 -0.00227332 -0.00383312 -0.00398565 -0.00408758 -0.00398565 -0.00384998)
            TransformAxis ty: coordinate=knee_angle_r is_rotation=false axis=(0 1 0)
              natCubicSpline: min_x=-1000000000000000000000000000000 max_x=1000000000000000000000000000000
                  min_y=-1000000000000000000000000000000 max_y=1000000000000000000000000000000
                  min_z=-1000000000000000000000000000000 max_z=1000000000000000000000000000000
                  x=(-2.094395 -1.22173 -0.5235988 -0.3490659 -0.1745329 0.1591486 2.094395)
                  y=(-0.3099054 -0.2993454 -0.2925988 -0.2915721 -0.2908388 -0.2898591 -0.2903988)
            TransformAxis r1: coordinate=knee_angle_r axis=(0 0 1)
        Body talus_r: mass=0.03457104 mass_center=(0 0 0) inertia_xx=0.00017343 inertia_yy=0.00017343
            inertia_zz=0.00017343 meshes=talus.vtp
          CustomJoint ankle_r: parent_body=tibia_r location_in_parent=(0 -0.3045635 0) location=(0 0 0)
            Coordinate ankle_angle_r: default_value=0 initial_value=0 tolerance=0 stiffness=0
                range=(-1.570796 1.570796) keys=a_key clamped=true restraint_active=false
            TransformAxis r1: coordinate=ankle_angle_r axis=(-0.1050135 -0.1740224 0.9791263)
        Body calcn_r: mass=0.432138 mass_center=(0.07082872 0.02124862 0) inertia_xx=0.00024281 inertia_yy=0.00067639
            inertia_zz=0.00071107 meshes=foot.vtp
          CustomJoint subtalar_r: parent_body=talus_r location_in_parent=(-0.03454317 -0.02971265 0.00560963)
              location=(0 0 0)
            Coordinate subtalar_angle_r: default_value=0 initial_value=0 tolerance=0 stiffness=0
                range=(-1.570796 1.570796) keys=a_key clamped=true locked=true restraint_active=false
            TransformAxis r1: coordinate=subtalar_angle_r axis=(0.7871796 0.6047475 -0.1209495)
        Body toes_r: mass=0.07488087 mass_center=(0.02450674 0.00424972 -0.01239503) inertia_xx=0.00001734
            inertia_yy=0.00003469 inertia_zz=0.00017343 meshes=bofoot.vtp
          CustomJoint mtp_r: parent_body=calcn_r location_in_parent=(0.1266417 -0.00141657 0.00076495) location=(0 0 0)
            Coordinate mtp_angle_r: default_value=0 initial_value=0 tolerance=0 stiffness=0 range=(-1.570796 1.570796)
                keys=t_key clamped=true locked=true restraint_active=false
            TransformAxis r1: coordinate=mtp_angle_r axis=(-0.5809544 0 0.8139361)
        Body femur_l: mass=3.568876 mass_center=(0 -0.1246662 0) inertia_xx=0.02762886 inertia_yy=0.00724252
            inertia_zz=0.02913514 meshes=l_femur.vtp
          CustomJoint hip_l: parent_body=pelvis location_in_parent=(-0.051611 -0.048253 -0.060955) location=(0 0 0)
            Coordinate hip_flexion_l: default_value=0 initial_value=0 tolerance=0 stiffness=0
                range=(-2.094395 2.094395) keys=(h_key leftmouse_button) clamped=true restraint_active=false
            Coordinate hip_adduction_l: default_value=0 initial_value=0 tolerance=0 stiffness=0
                range=(-2.094395 2.094395) keys=(h_key leftmouse_button) clamped=true restraint_active=false
            Coordinate hip_rotation_l: default_value=0 initial_value=0 tolerance=0 stiffness=0
                range=(-2.094395 2.094395) keys=(h_key leftmouse_button) clamped=true restraint_active=false
            TransformAxis r1: coordinate=hip_flexion_l axis=(0 0 1)
            TransformAxis r2: coordinate=hip_adduction_l axis=(-1 0 0)
            TransformAxis r3: coordinate=hip_rotation_l axis=(0 -1 0)
        Body tibia_l: mass=1.281721 mass_center=(0 -0.1322372 0) inertia_xx=0.00874101 inertia_yy=0.00088451
            inertia_zz=0.00886242 meshes=(l_tibia.vtp l_fibula.vtp)
          CustomJoint knee_l: parent_body=femur_l location_in_parent=(0 0 0) location=(0 0 0)
            Coordinate knee_angle_l: default_value=0 initial_value=0 tolerance=0 stiffness=0
                range=(-2.094395 0.1745329) keys=k_key clamped=true restraint_active=false
            TransformAxis tx: coordinate=knee_angle_l is_rotation=false axis=(1 0 0)
              natCubicSpline: min_x=-1000000000000000000000000000000 max_x=1000000000000000000000000000000
                  min_y=-1000000000000000000000000000000 max_y=1000000000000000000000000000000
                  min_z=-1000000000000000000000000000000 max_z=1000000000000000000000000000000
                  x=(-2.094395 -1.745329 -1.396263 -1.047198 -0.6981317 -0.3490659 -0.1745329 0.1973442 0.337395 0.4901776 1.52146 2.094395)
                  y=(-0.00234666 0.00131266 0.00301399 0.00300665 0.00155466 -0.00073333 -0.00227332 -0.00383312 -0.00398565 -0.00408758 -0.00398565 -0.00384998)
            TransformAxis ty: coordinate=knee_angle_l is_rotation=false axis=(0 1 0)
              natCubicSpline: min_x=-1000000000000000000000000000000 max_x=1000000000000000000000000000000
                  min_y=-1000000000000000000000000000000 max_y=1000000000000000000000000000000
                  min_z=-1000000000000000000000000000000 max_z=1000000000000000000000000000000
                  x=(-2.094395 -1.22173 -0.5235988 -0.3490659 -0.1745329 0.1591486 2.094395)
                  y=(-0.3099054 -0.2993454 -0.2925988 -0.2915721 -0.2908388 -0.2898591 -0.2903988)
            TransformAxis r1: coordinate=knee_angle_l axis=(0 0 1)
        Body talus_l: mass=0.03457104 mass_center=(0 0 0) inertia_xx=0.00017343 inertia_yy=0.00017343
            inertia_zz=0.00017343 meshes=l_talus.vtp
          CustomJoint ankle_l: parent_body=tibia_l location_in_parent=(0 -0.3045635 0) location=(0 0 0)
            Coordinate ankle_angle_l: default_value=0 initial_value=0 tolerance=0 stiffness=0
                range=(-1.047198 1.047198) keys=a_key clamped=true restraint_active=false
            TransformAxis r1: coordinate=ankle_angle_l axis=(0.1050135 -0.1740224 0.9791263)
        Body calcn_l: mass=0.432138 mass_center=(0.07082872 0.02124862 0) inertia_xx=0.00024281 inertia_yy=0.00067639
            inertia_zz=0.00071107 meshes=l_foot.vtp
          CustomJoint subtalar_l: parent_body=talus_l location_in_parent=(-0.03454317 -0.02971265 -0.00560963)
              location=(0 0 0)
            Coordinate subtalar_angle_l: default_value=0 initial_value=0 tolerance=0 stiffness=0
                range=(-1.570796 1.570796) keys=a_key clamped=true locked=true restraint_active=false
            TransformAxis r1: coordinate=subtalar_angle_l axis=(-0.7871796 -0.6047475 -0.1209495)
        Body toes_l: mass=0.07488087 mass_center=(0.02450674 0.00424972 0.01239503) inertia_xx=0.00001734
            inertia_yy=0.00003469 inertia_zz=0.00017343 meshes=l_bofoot.vtp
          CustomJoint mtp_l: parent_body=calcn_l location_in_parent=(0.1266417 -0.00141657 -0.00076495)
              location=(0 0 0)
            Coordinate mtp_angle_l: default_value=0 initial_value=0 tolerance=0 stiffness=0 range=(-1.047198 1.047198)
                keys=t_key clamped=true locked=true restraint_active=false
            TransformAxis r1: coordinate=mtp_angle_l axis=(0.5809544 0 0.8139361)
        Body torso: mass=12.95816 mass_center=(-0.0219 0.2336 0) inertia_xx=0.2974016 inertia_yy=0.1523818
            inertia_zz=0.2887085 meshes=(hat_spine.vtp hat_jaw.vtp hat_skull.vtp hat_ribs.vtp)
          CustomJoint back: parent_body=pelvis location_in_parent=(-0.073511 0.059495 0) location=(0 0 0)
            Coordinate lumbar_extension: default_value=0 initial_value=0 tolerance=0 stiffness=0
                range=(-1.570796 1.570796) keys=q_key clamped=true restraint_active=false
            Coordinate lumbar_bending: default_value=0 initial_value=0 tolerance=0 stiffness=0
                range=(-1.570796 1.570796) keys=q_key clamped=true restraint_active=false
            Coordinate lumbar_rotation: default_value=0 initial_value=0 tolerance=0 stiffness=0
                range=(-1.570796 1.570796) keys=q_key clamped=true restraint_active=false
            TransformAxis r1: coordinate=lumbar_extension axis=(0 0 1)
            TransformAxis r2: coordinate=lumbar_bending axis=(1 0 0)
            TransformAxis r3: coordinate=lumbar_rotation axis=(0 1 0)
      MarkerSet:
        Marker RASI: pelvis (0.00705244 0.0166747 0.08546514)
        Marker LASI: pelvis (0.00941329 0.01906906 -0.08634043)
        Marker SACR: pelvis (-0.1200999 0.03758735 -0.00132053)
        Marker RFEP: femur_r (0.0189349 0.00075722 -0.00629659)
        Marker RTHI: femur_r (0.04900286 -0.1879025 0.106819)
        Marker RUL1: femur_r (-0.00250087 -0.1502947 0.05251745)
        Marker RUL2: femur_r (0.00928087 -0.2341873 0.03364234)
        Marker RKNE: femur_r (0.02566656 -0.2962654 0.03666652) fixed=true
        Marker RFEO: femur_r (0 -0.2962654 0) fixed=true
        Marker RLL1: tibia_r (-0.00524639 -0.2294112 0.02579265)
        Marker RLL2: tibia_r (0.01000827 -0.2784451 -0.03825875)
        Marker RTIB: tibia_r (0.01008926 -0.1915831 0.09714093)
        Marker RANK: tibia_r (-0.00354144 -0.3151878 0.03753922) fixed=true
        Marker RTIO: tibia_r (0.00627895 -0.2877935 -0.0007842)
        Marker RTOE: calcn_r (0.1204088 0.01770718 -0.00708287) fixed=true
        Marker LFEP: femur_l (0.01564338 0.00076822 0.00415964)
        Marker LTHI: femur_l (0.01308522 -0.202085 -0.1173049)
        Marker LUL1: femur_l (-0.02112384 -0.1419078 -0.05264582)
        Marker LUL2: femur_l (-0.02807945 -0.2211013 -0.02854592)
        Marker LKNE: femur_l (0.01099995 -0.2962654 -0.03666652) fixed=true
        Marker LFEO: femur_l (0.00361905 -0.2895811 0.01079858)
        Marker LLL1: tibia_l (0.00000839 -0.2369713 -0.02637862)
        Marker LLL2: tibia_l (-0.00052449 -0.2818799 0.03864374)
        Marker LTIB: tibia_l (0.01255929 -0.2022898 -0.09750155)
        Marker LANK: tibia_l (-0.00354144 -0.3045635 -0.03753922) fixed=true
        Marker LTIO: tibia_l (-0.0014012 -0.2861868 0.00006037)
        Marker LTOE: calcn_l (0.1204088 0.01770718 0.00708287) fixed=true
        Marker LAC: torso (-0.00408695 0.2747951 -0.06660312)
        Marker RAC: torso (-0.00246115 0.2703556 0.06723502)
        Marker N: torso (-0.1154399 0.2992454 -0.00190971)
  ActuatorSet:
    Thelen2003Muscle [values shared by the 92 below unless stated]: muscle_model=9 activation_time_constant=0.01
        deactivation_time_constant=0.04 Vmax=10 Vmax0=5 FmaxTendonStrain=0.033 FmaxMuscleStrain=0.6 KshapeActive=0.5
        KshapePassive=4 damping=0.05 Af=0.3 Flen=1.8
    Thelen2003Muscle glut_med1_r: max_isometric_force=819 optimal_fiber_length=0.03909624
        tendon_slack_length=0.05700012 pennation_angle=0.1396263
      MusclePoint P1: pelvis (-0.029784 0.022192 0.088257)
      MusclePoint P2: femur_r (-0.0159866 -0.00857996 0.04069983)
    Thelen2003Muscle glut_med2_r: max_isometric_force=573 optimal_fiber_length=0.06175208
        tendon_slack_length=0.03873208 pennation_angle=0
      MusclePoint P1: pelvis (-0.062415 0.032485 0.055918)
      MusclePoint P2: femur_r (-0.01891992 -0.00425332 0.03864651)
    Thelen2003Muscle glut_med3_r: max_isometric_force=653 optimal_fiber_length=0.04721892
        tendon_slack_length=0.03873998 pennation_angle=0.3316126
      MusclePoint P1: pelvis (-0.089279 0.007665 0.047304)
      MusclePoint P2: femur_r (-0.02265991 -0.00344665 0.03798651)
    Thelen2003Muscle glut_min1_r: max_isometric_force=270 optimal_fiber_length=0.04973438
        tendon_slack_length=0.01170221 pennation_angle=0.1745329
      MusclePoint P1: pelvis (-0.034091 -0.00584 0.077088)
      MusclePoint P2: femur_r (-0.00527998 -0.00762664 0.0410665)
    Thelen2003Muscle glut_min2_r: max_isometric_force=285 optimal_fiber_length=0.04096634
        tendon_slack_length=0.01902009 pennation_angle=0
      MusclePoint P1: pelvis (-0.046209 -0.004745 0.072343)
      MusclePoint P2: femur_r (-0.00703997 -0.00762664 0.0410665)
    Thelen2003Muscle glut_min3_r: max_isometric_force=323 optimal_fiber_length=0.02779938
        tendon_slack_length=0.03730969 pennation_angle=0.01745329
      MusclePoint P1: pelvis (-0.060882 -0.004599 0.062488)
      MusclePoint P2: femur_r (-0.00989996 -0.00608664 0.04033317)
    Thelen2003Muscle semimem_r: max_isometric_force=1288 optimal_fiber_length=0.05844717 tendon_slack_length=0.2622817
        pennation_angle=0.2617994
      MusclePoint P1: pelvis (-0.087016 -0.0711531 0.0522023)
      MuscleViaPoint P2: tibia_r (-0.02464839 -0.02492463 -0.01339371) range=(-0.5585054 0.1745329)
          coordinate=knee_angle_r
      MusclePoint P3: tibia_r (-0.01912375 -0.03379238 -0.01386118)
    Thelen2003Muscle semiten_r: max_isometric_force=410 optimal_fiber_length=0.1462656 tendon_slack_length=0.1859247
        pennation_angle=0.08726646
      MusclePoint P1: pelvis (-0.0922355 -0.0802124 0.0440847)
      MuscleViaPoint P2: tibia_r (-0.02976931 -0.02024993 -0.0161277) range=(-0.3316126 0.1745329)
          coordinate=knee_angle_r
      MusclePoint P3: tibia_r (-0.0235293 -0.03741173 -0.01620561)
      MusclePoint P4: tibia_r (-0.00800365 -0.05283823 -0.01735304)
      MusclePoint P5: tibia_r (0.00191238 -0.06771226 -0.01366994)
    Thelen2003Muscle bifemlh_r: max_isometric_force=896 optimal_fiber_length=0.07957555 tendon_slack_length=0.2379966
        pennation_angle=0
      MusclePoint P1: pelvis (-0.0919508 -0.0748761 0.0506912)
      MusclePoint P2: tibia_r (-0.02131944 -0.02549834 0.02084489)
      MusclePoint P3: tibia_r (-0.01657392 -0.03987657 0.02429425)
    Thelen2003Muscle bifemsh_r: max_isometric_force=804 optimal_fiber_length=0.1257516 tendon_slack_length=0.06469303
        pennation_angle=0.4014257
      MusclePoint P1: femur_r (0.00366665 -0.154806 0.01715993)
      MusclePoint P2: tibia_r (-0.02131944 -0.02549834 0.02084489)
      MusclePoint P3: tibia_r (-0.01657392 -0.03987657 0.02429425)
    Thelen2003Muscle sar_r: max_isometric_force=156 optimal_fiber_length=0.3789175 tendon_slack_length=0.07286875
        pennation_angle=0
      MusclePoint P1: pelvis (-0.011169 -0.000949 0.090666)
      MusclePoint P2: femur_r (-0.00219999 -0.2616522 -0.03087321)
      MusclePoint P3: tibia_r (-0.00396641 -0.02967723 -0.02826066)
      MusclePoint P4: tibia_r (0.00424972 -0.04171812 -0.0271274)
      MusclePoint P5: tibia_r (0.01721138 -0.05949613 -0.01784884)
    Thelen2003Muscle add_long_r: max_isometric_force=627 optimal_fiber_length=0.101161 tendon_slack_length=0.08063557
        pennation_angle=0.1047198
      MusclePoint P1: pelvis (-0.023068 -0.061028 0.012337)
      MusclePoint P2: femur_r (0.00366665 -0.154806 0.01715993)
    Thelen2003Muscle add_brev_r: max_isometric_force=429 optimal_fiber_length=0.09743118 tendon_slack_length=0.01465131
        pennation_angle=0
      MusclePoint P1: pelvis (-0.042851 -0.066795 0.011972)
      MusclePoint P2: femur_r (0.00066 -0.0877063 0.02155991)
    Thelen2003Muscle add_mag1_r: max_isometric_force=381 optimal_fiber_length=0.06376208 tendon_slack_length=0.04397385
        pennation_angle=0.08726646
      MusclePoint P1: pelvis (-0.053436 -0.085702 0.018615)
      MusclePoint P2: femur_r (-0.00329999 -0.0888063 0.0248599)
    Thelen2003Muscle add_mag2_r: max_isometric_force=343 optimal_fiber_length=0.0887892 tendon_slack_length=0.08805541
        pennation_angle=0.05235988
      MusclePoint P1: pelvis (-0.060663 -0.087016 0.022484)
      MusclePoint P2: femur_r (0.00395998 -0.167566 0.0166466)
    Thelen2003Muscle add_mag3_r: max_isometric_force=488 optimal_fiber_length=0.09611915 tendon_slack_length=0.1826997
        pennation_angle=0.08726646
      MusclePoint P1: pelvis (-0.0810884 -0.0833149 0.0356386)
      MusclePoint P2: femur_r (0.00513331 -0.2813788 -0.01950659)
    Thelen2003Muscle tfl_r: max_isometric_force=233 optimal_fiber_length=0.06942851 tendon_slack_length=0.3106012
        pennation_angle=0.05235988
      MusclePoint P1: pelvis (-0.022703 0.015622 0.090593)
      MusclePoint P2: femur_r (0.02155991 -0.07296637 0.04377982)
      MusclePoint P3: femur_r (0.00395998 -0.2969254 0.02617989)
      MusclePoint P4: tibia_r (0.00424972 -0.03449359 0.02103613)
    Thelen2003Muscle pect_r: max_isometric_force=266 optimal_fiber_length=0.07324707 tendon_slack_length=0.02417153
        pennation_angle=0
      MusclePoint P1: pelvis (-0.031463 -0.056064 0.032923)
      MusclePoint P2: femur_r (-0.00894663 -0.06027975 0.01855326)
    Thelen2003Muscle grac_r: max_isometric_force=162 optimal_fiber_length=0.2563482 tendon_slack_length=0.091761
        pennation_angle=0.05235988
      MusclePoint P1: pelvis (-0.0540273 -0.086651 0.0203962)
      MuscleViaPoint P2: tibia_r (-0.01881919 -0.02259436 -0.02673076) range=(-0.4363323 0.1745329)
          coordinate=knee_angle_r
      MusclePoint P3: tibia_r (-0.01376202 -0.03649804 -0.02535668)
      MusclePoint P4: tibia_r (0.00424972 -0.05921281 -0.01614895)
    Thelen2003Muscle glut_max1_r: max_isometric_force=573 optimal_fiber_length=0.1038212 tendon_slack_length=0.09139188
        pennation_angle=0.08726646
      MusclePoint P1: pelvis (-0.087235 0.044676 0.0511)
      MusclePoint P2: pelvis (-0.094243 0.000876 0.064678)
      MusclePoint P3: femur_r (-0.03351319 -0.01818659 0.02874655)
      MusclePoint P4: femur_r (-0.02031325 -0.0415065 0.03446652)
    Thelen2003Muscle glut_max2_r: max_isometric_force=819 optimal_fiber_length=0.1075422 tendon_slack_length=0.09291061
        pennation_angle=0
      MusclePoint P1: pelvis (-0.098477 0.012848 0.041099)
      MusclePoint P2: pelvis (-0.100448 -0.03796 0.066722)
      MusclePoint P3: femur_r (-0.03123987 -0.03886651 0.02148658)
      MusclePoint P4: femur_r (-0.01143995 -0.07450636 0.03072654)
    Thelen2003Muscle glut_max3_r: max_isometric_force=552 optimal_fiber_length=0.1053484 tendon_slack_length=0.10608
        pennation_angle=0.08726646
      MusclePoint P1: pelvis (-0.113588 -0.022922 0.004234)
      MusclePoint P2: pelvis (-0.111617 -0.076796 0.029419)
      MusclePoint P3: femur_r (-0.02192658 -0.07633968 0.00989996)
      MusclePoint P4: femur_r (-0.00439998 -0.1040596 0.03013988)
    Thelen2003Muscle iliacus_r: max_isometric_force=1073 optimal_fiber_length=0.07309827 tendon_slack_length=0.07309827
        pennation_angle=0.1221731
      MusclePoint P1: pelvis (-0.049202 0.026645 0.062342)
      MusclePoint P2: pelvis (-0.018834 -0.04015 0.059203)
      MuscleViaPoint P3: pelvis (-0.021024 -0.058765 0.059568) range=(-1.570796 0.7853982) coordinate=hip_flexion_r
      MusclePoint P4: femur_r (0.00124666 -0.03981984 0.00417998)
      MusclePoint P5: femur_r (-0.01415327 -0.04553981 0.00945996)
    Thelen2003Muscle psoas_r: max_isometric_force=1113 optimal_fiber_length=0.07307182 tendon_slack_length=0.1169149
        pennation_angle=0.1396263
      MusclePoint P1: pelvis (-0.047231 0.064751 0.021097)
      MusclePoint P2: pelvis (-0.017374 -0.04161 0.055407)
      MuscleViaPoint P3: pelvis (-0.021024 -0.058765 0.059568) range=(-1.570796 0.7853982) coordinate=hip_flexion_r
      MusclePoint P4: femur_r (0.00117333 -0.03717985 0.00278666)
      MusclePoint P5: femur_r (-0.01378661 -0.04377982 0.00762664)
    Thelen2003Muscle quad_fem_r: max_isometric_force=381 optimal_fiber_length=0.03948765 tendon_slack_length=0.01755006
        pennation_angle=0
      MusclePoint P1: pelvis (-0.083439 -0.084023 0.03796)
      MusclePoint P2: femur_r (-0.02793988 -0.02632656 0.02683989)
    Thelen2003Muscle gem_r: max_isometric_force=164 optimal_fiber_length=0.01755964 tendon_slack_length=0.02853441
        pennation_angle=0
      MusclePoint P1: pelvis (-0.082709 -0.05986 0.052122)
      MusclePoint P2: femur_r (-0.01041329 -0.00241999 0.03248653)
    Thelen2003Muscle peri_r: max_isometric_force=444 optimal_fiber_length=0.01899817 tendon_slack_length=0.08403038
        pennation_angle=0.1745329
      MusclePoint P1: pelvis (-0.101908 0.000219 0.017155)
      MusclePoint P2: pelvis (-0.087089 -0.020148 0.047961)
      MusclePoint P3: femur_r (-0.01085329 -0.00263999 0.03204653)
    Thelen2003Muscle rect_fem_r: max_isometric_force=1169 optimal_fiber_length=0.08369867 tendon_slack_length=0.2276017
        pennation_angle=0.08726646
      MusclePoint P1: pelvis (-0.021535 -0.022703 0.070664)
      MuscleViaPoint P2: femur_r (0.02449323 -0.2955321 0.00139333) range=(-2.617994 -1.459968) coordinate=knee_angle_r
      MovingMusclePoint P3: tibia_r (0.02856261 0.01733646 0.0009916) x_coordinate=knee_angle_r
          y_coordinate=knee_angle_r z_coordinate=knee_angle_r
        XAttachment:
          natCubicSpline: min_x=-1000000000000000000000000000000 max_x=1000000000000000000000000000000
              min_y=-1000000000000000000000000000000 max_y=1000000000000000000000000000000
              min_z=-1000000000000000000000000000000 max_z=1000000000000000000000000000000
              x=(-2.094395 -1.999973 -1.570796 -1.457524 -1.396263 -1.047198 -0.6981317 -0.5263913 -0.3490659 -0.1745329 0 0.00017453 0.00034907 0.02792527 0.08726646 0.1745329 2.094395)
              y=(0.01103547 0.01274479 0.01948364 0.02100521 0.02178801 0.02590173 0.02989498 0.03193679 0.03427473 0.03784373 0.04374208 0.04374869 0.04375529 0.04484047 0.04745096 0.0519199 0.04061891)
        YAttachment:
          natCubicSpline: min_x=-1000000000000000000000000000000 max_x=1000000000000000000000000000000
              min_y=-1000000000000000000000000000000 max_y=1000000000000000000000000000000
              min_z=-1000000000000000000000000000000 max_z=1000000000000000000000000000000
              x=(-2.094395 -1.999973 -1.570796 -1.457524 -1.396263 -1.047198 -0.6981317 -0.5263913 -0.3490659 -0.1745329 0 0.00017453 0.00034907 0.02792527 0.08726646 0.1745329 2.094395)
              y=(0.01658215 0.01682983 0.01778802 0.01790513 0.01793003 0.01764939 0.01716698 0.01688892 0.01658789 0.01612373 0.01486272 0.01486088 0.01485904 0.01453581 0.0135817 0.01130103 -0.04772253)
        ZAttachment:
          natCubicSpline: min_x=-1000000000000000000000000000000 max_x=1000000000000000000000000000000
              min_y=-1000000000000000000000000000000 max_y=1000000000000000000000000000000
              min_z=-1000000000000000000000000000000 max_z=1000000000000000000000000000000 x=(-2.0944 0.1745)
              y=(0.0009916 0.0009916)
    Thelen2003Muscle vas_med_r: max_isometric_force=1294 optimal_fiber_length=0.06540485 tendon_slack_length=0.09259563
        pennation_angle=0.08726646
      MusclePoint P1: femur_r (0.01026662 -0.153926 0.01378661)
      MusclePoint P2: femur_r (0.02610656 -0.2030592 0.00066)
      MuscleViaPoint P3: femur_r (0.02713322 -0.2968521 -0.00916663) range=(-2.617994 -1.210037)
          coordinate=knee_angle_r
      MuscleViaPoint P4: femur_r (0.02009325 -0.312032 -0.00960663) range=(-2.617994 -1.780061) coordinate=knee_angle_r
      MovingMusclePoint P5: tibia_r (0.02446745 0.0166827 -0.01034099) x_coordinate=knee_angle_r
          y_coordinate=knee_angle_r z_coordinate=knee_angle_r
        XAttachment:
          natCubicSpline: min_x=-1000000000000000000000000000000 max_x=1000000000000000000000000000000
              min_y=-1000000000000000000000000000000 max_y=1000000000000000000000000000000
              min_z=-1000000000000000000000000000000 max_z=1000000000000000000000000000000
              x=(-2.094395 -1.999973 -1.570796 -1.457524 -1.396263 -1.047198 -0.6981317 -0.5263913 -0.3490659 -0.1745329 0 0.00017453 0.00034907 0.02792527 0.08726646 0.1745329 2.094395)
              y=(0.00694898 0.00865831 0.0153961 0.0169175 0.01770027 0.02181233 0.02579492 0.02782652 0.03014855 0.03369777 0.03963476 0.03964149 0.03964822 0.04075617 0.04344406 0.04812833 0.04457476)
        YAttachment:
          natCubicSpline: min_x=-1000000000000000000000000000000 max_x=1000000000000000000000000000000
              min_y=-1000000000000000000000000000000 max_y=1000000000000000000000000000000
              min_z=-1000000000000000000000000000000 max_z=1000000000000000000000000000000
              x=(-2.094395 -1.999973 -1.570796 -1.457524 -1.396263 -1.047198 -0.6981317 -0.5263913 -0.3490659 -0.1745329 0 0.00017453 0.00034907 0.02792527 0.08726646 0.1745329 2.094395)
              y=(0.01587654 0.01612422 0.01708848 0.01720665 0.01723172 0.01696082 0.01654507 0.01633854 0.01617319 0.01603293 0.01543476 0.01543379 0.01543283 0.01525401 0.01465035 0.0129807 -0.04647814)
        ZAttachment:
          natCubicSpline: min_x=-1000000000000000000000000000000 max_x=1000000000000000000000000000000
              min_y=-1000000000000000000000000000000 max_y=1000000000000000000000000000000
              min_z=-1000000000000000000000000000000 max_z=1000000000000000000000000000000 x=(-2.094395 2.094395)
              y=(-0.01034099 -0.01034099)
    Thelen2003Muscle vas_int_r: max_isometric_force=1365 optimal_fiber_length=0.0640342 tendon_slack_length=0.1000994
        pennation_angle=0.05235988
      MusclePoint P1: femur_r (0.02126658 -0.1410927 0.02273324)
      MusclePoint P2: femur_r (0.02456657 -0.152826 0.02089991)
      MuscleViaPoint P3: femur_r (0.02515323 -0.2955321 0.00403332) range=(-2.617994 -1.42) coordinate=knee_angle_r
      MovingMusclePoint P4: tibia_r (0.023407 0.0189513 0.00127492) x_coordinate=knee_angle_r y_coordinate=knee_angle_r
          z_coordinate=knee_angle_r
        XAttachment:
          natCubicSpline: min_x=-1000000000000000000000000000000 max_x=1000000000000000000000000000000
              min_y=-1000000000000000000000000000000 max_y=1000000000000000000000000000000
              min_z=-1000000000000000000000000000000 max_z=1000000000000000000000000000000
              x=(-2.094395 -1.999973 -1.570796 -1.457524 -1.396263 -1.047198 -0.6981317 -0.5263913 -0.3490659 -0.1745329 0 0.00017453 0.00034907 0.02792527 0.08726646 0.1745329 2.094395)
              y=(0.00585987 0.0075692 0.01431035 0.01583233 0.01661519 0.02073264 0.02475214 0.02682357 0.02922173 0.03295567 0.03928389 0.03929114 0.0392984 0.04049398 0.04339817 0.04847295 0.04595491)
        YAttachment:
          natCubicSpline: min_x=-1000000000000000000000000000000 max_x=1000000000000000000000000000000
              min_y=-1000000000000000000000000000000 max_y=1000000000000000000000000000000
              min_z=-1000000000000000000000000000000 max_z=1000000000000000000000000000000
              x=(-2.094395 -1.999973 -1.570796 -1.457524 -1.396263 -1.047198 -0.6981317 -0.5263913 -0.3490659 -0.1745329 0 0.00017453 0.00034907 0.02792527 0.08726646 0.1745329 2.094395)
              y=(0.01813147 0.01837915 0.01934503 0.01946348 0.0194886 0.01922028 0.01882181 0.01863309 0.01849954 0.01842462 0.01791423 0.01791334 0.01791245 0.01774442 0.0171541 0.01546104 -0.04856765)
        ZAttachment:
          natCubicSpline: min_x=-1000000000000000000000000000000 max_x=1000000000000000000000000000000
              min_y=-1000000000000000000000000000000 max_y=1000000000000000000000000000000
              min_z=-1000000000000000000000000000000 max_z=1000000000000000000000000000000 x=(-2.0944 2.0944)
              y=(0.00127492 0.00127492)
    Thelen2003Muscle vas_lat_r: max_isometric_force=1871 optimal_fiber_length=0.06168996 tendon_slack_length=0.1153015
        pennation_angle=0.08726646
      MusclePoint P1: femur_r (0.00351999 -0.1359594 0.02559323)
      MusclePoint P2: femur_r (0.01972659 -0.1900059 0.02999321)
      MuscleViaPoint P3: femur_r (0.02647322 -0.2955321 0.01503327) range=(-2.617994 -1.210037) coordinate=knee_angle_r
      MuscleViaPoint P4: femur_r (0.01855326 -0.3111521 0.01349328) range=(-2.617994 -1.920037) coordinate=knee_angle_r
      MovingMusclePoint P5: tibia_r (0.02763154 0.01601666 0.01168674) x_coordinate=knee_angle_r
          y_coordinate=knee_angle_r z_coordinate=knee_angle_r
        XAttachment:
          natCubicSpline: min_x=-1000000000000000000000000000000 max_x=1000000000000000000000000000000
              min_y=-1000000000000000000000000000000 max_y=1000000000000000000000000000000
              min_z=-1000000000000000000000000000000 max_z=1000000000000000000000000000000
              x=(-2.094395 -1.999973 -1.570796 -1.457524 -1.396263 -1.047198 -0.6981317 -0.5263913 -0.3490659 -0.1745329 0 0.00017453 0.00034907 0.02792527 0.08726646 0.1745329 2.094395)
              y=(0.01012122 0.01183055 0.01856741 0.02008865 0.02087138 0.02498194 0.0289537 0.03097279 0.03326856 0.03674186 0.04246586 0.04247225 0.04247865 0.04352974 0.04606355 0.05042063 0.04134738)
        YAttachment:
          natCubicSpline: min_x=-1000000000000000000000000000000 max_x=1000000000000000000000000000000
              min_y=-1000000000000000000000000000000 max_y=1000000000000000000000000000000
              min_z=-1000000000000000000000000000000 max_z=1000000000000000000000000000000
              x=(-2.094395 -1.999973 -1.570796 -1.457524 -1.396263 -1.047198 -0.6981317 -0.5263913 -0.3490659 -0.1745329 0 0.00017453 0.00034907 0.02792527 0.08726646 0.1745329 2.094395)
              y=(0.01525067 0.01549835 0.0164579 0.01657525 0.01660018 0.01632173 0.01585447 0.01559301 0.01532443 0.01494282 0.01387279 0.01387123 0.01386966 0.01359204 0.0127548 0.0107003 -0.046281)
        ZAttachment:
          natCubicSpline: min_x=-1000000000000000000000000000000 max_x=1000000000000000000000000000000
              min_y=-1000000000000000000000000000000 max_y=1000000000000000000000000000000
              min_z=-1000000000000000000000000000000 max_z=1000000000000000000000000000000 x=(-2.094395 2.094395)
              y=(0.01168674 0.01168674)
    Thelen2003Muscle med_gas_r: max_isometric_force=1558 optimal_fiber_length=0.04252592 tendon_slack_length=0.2764185
        pennation_angle=0.296706
      MusclePoint P1: femur_r (-0.01393328 -0.2881255 -0.01723326)
      MuscleViaPoint P2: femur_r (-0.02199991 -0.2949454 -0.01891992) range=(-0.7853982 0.1745329)
          coordinate=knee_angle_r
      MusclePoint P3: calcn_r (0 0.0219569 -0.00375392)
    Thelen2003Muscle lat_gas_r: max_isometric_force=683 optimal_fiber_length=0.04534851 tendon_slack_length=0.2692568
        pennation_angle=0.1396263
      MusclePoint P1: femur_r (-0.01613327 -0.2893721 0.01994658)
      MuscleViaPoint P2: femur_r (-0.02199991 -0.2946521 0.02009325) range=(-0.7853982 0.1745329)
          coordinate=knee_angle_r
      MusclePoint P3: calcn_r (0 0.0219569 -0.00375392)
    Thelen2003Muscle soleus_r: max_isometric_force=3549 optimal_fiber_length=0.03541436 tendon_slack_length=0.1770718
        pennation_angle=0.4363323
      MusclePoint P1: tibia_r (-0.00169989 -0.1085804 0.00502884)
      MusclePoint P2: calcn_r (0 0.0219569 -0.00375392)
    Thelen2003Muscle tib_post_r: max_isometric_force=1588 optimal_fiber_length=0.0219569 tendon_slack_length=0.219569
        pennation_angle=0.2094395
      MusclePoint P1: tibia_r (-0.0066579 -0.09547711 0.00134575)
      MusclePoint P2: tibia_r (-0.01019934 -0.2869272 -0.01621978)
      MusclePoint P3: calcn_r (0.02953558 0.02365679 -0.02025701)
      MusclePoint P4: calcn_r (0.05467977 0.01126177 -0.01990287)
    Thelen2003Muscle flex_dig_r: max_isometric_force=310 optimal_fiber_length=0.02408176 tendon_slack_length=0.2833149
        pennation_angle=0.1221731
      MusclePoint P1: tibia_r (-0.00587878 -0.1449156 -0.00127492)
      MusclePoint P2: tibia_r (-0.01090762 -0.2869272 -0.01388243)
      MusclePoint P3: calcn_r (0.03088132 0.02231105 -0.01983204)
      MusclePoint P4: calcn_r (0.05014673 0.01246585 -0.01862795)
      MusclePoint P5: calcn_r (0.117434 -0.00573713 0.00821613)
      MusclePoint P6: toes_r (-0.00134575 -0.00552464 0.01041182)
      MusclePoint P7: toes_r (0.02018619 -0.00502884 0.01522817)
      MusclePoint P8: toes_r (0.03123547 -0.00424972 0.01714055)
    Thelen2003Muscle flex_hal_r: max_isometric_force=322 optimal_fiber_length=0.03045635 tendon_slack_length=0.2691491
        pennation_angle=0.1745329
      MusclePoint P1: tibia_r (-0.00559547 -0.1653142 0.01728221)
      MusclePoint P2: tibia_r (-0.01317414 -0.2889103 -0.0123242)
      MusclePoint P3: calcn_r (0.02648994 0.01954873 -0.01706972)
      MusclePoint P4: calcn_r (0.07352021 0.00481635 -0.01813215)
      MusclePoint P5: calcn_r (0.1222504 -0.00375392 -0.01905293)
      MusclePoint P6: toes_r (0.01097845 -0.00453304 -0.01876961)
      MusclePoint P7: toes_r (0.03980574 -0.00722453 -0.01282)
    Thelen2003Muscle tib_ant_r: max_isometric_force=905 optimal_fiber_length=0.06941215 tendon_slack_length=0.1579481
        pennation_angle=0.08726646
      MusclePoint P1: tibia_r (0.01267834 -0.1150258 0.0081453)
      MusclePoint P2: tibia_r (0.02330265 -0.2798443 -0.01253668)
      MusclePoint P3: calcn_r (0.08258629 0.01260751 -0.02160276)
    Thelen2003Muscle per_brev_r: max_isometric_force=435 optimal_fiber_length=0.03541436 tendon_slack_length=0.1140342
        pennation_angle=0.08726646
      MusclePoint P1: tibia_r (-0.00495801 -0.1874128 0.02301933)
      MusclePoint P2: tibia_r (-0.01402409 -0.2963474 0.02004453)
      MusclePoint P3: tibia_r (-0.01019934 -0.3042093 0.0204695)
      MusclePoint P4: calcn_r (0.03336033 0.01912375 0.01650309)
      MusclePoint P5: calcn_r (0.04795104 0.01551149 0.02429425)
    Thelen2003Muscle per_long_r: max_isometric_force=943 optimal_fiber_length=0.03470607 tendon_slack_length=0.2443591
        pennation_angle=0.1745329
      MusclePoint P1: tibia_r (0.00035414 -0.1110594 0.02564)
      MusclePoint P2: tibia_r (-0.01466155 -0.2978348 0.02025701)
      MusclePoint P3: tibia_r (-0.01147425 -0.3059092 0.0204695)
      MusclePoint P4: calcn_r (0.03102298 0.01629061 0.01565315)
      MusclePoint P5: calcn_r (0.04823436 0.00750784 0.02011536)
      MusclePoint P6: calcn_r (0.06034607 0.00488718 0.00835779)
      MusclePoint P7: calcn_r (0.08520695 0.00602044 -0.01303248)
    Thelen2003Muscle per_tert_r: max_isometric_force=180 optimal_fiber_length=0.05595469 tendon_slack_length=0.07082872
        pennation_angle=0.2268928
      MusclePoint P1: tibia_r (0.00070829 -0.1986037 0.01636143)
      MusclePoint P2: tibia_r (0.01621978 -0.2882021 0.01126177)
      MusclePoint P3: calcn_r (0.06070021 0.01614895 0.02117779)
    Thelen2003Muscle ext_dig_r: max_isometric_force=512 optimal_fiber_length=0.07224529 tendon_slack_length=0.2443591
        pennation_angle=0.1396263
      MusclePoint P1: tibia_r (0.00226652 -0.09781446 0.01954873)
      MusclePoint P2: tibia_r (0.0204695 -0.2838107 0.00509967)
      MusclePoint P3: calcn_r (0.06530408 0.02748154 -0.00007083)
      MusclePoint P4: calcn_r (0.1144592 0.00389558 0.00920773)
      MusclePoint P5: toes_r (0.00021249 0.00332895 0.01083679)
      MusclePoint P6: toes_r (0.03137712 -0.00028331 0.01770718)
    Thelen2003Muscle ext_hal_r: max_isometric_force=162 optimal_fiber_length=0.07861988 tendon_slack_length=0.2160276
        pennation_angle=0.1047198
      MusclePoint P1: tibia_r (0.00084994 -0.1251543 0.01614895)
      MusclePoint P2: tibia_r (0.02309016 -0.2822524 -0.00602044)
      MusclePoint P3: calcn_r (0.06870386 0.02755237 -0.01494486)
      MusclePoint P4: calcn_r (0.09158154 0.02188607 -0.01820298)
      MusclePoint P5: calcn_r (0.122817 0.00984519 -0.01983204)
      MusclePoint P6: toes_r (0.02110696 0.00290398 -0.01735304)
      MusclePoint P7: toes_r (0.03987657 0.00240818 -0.01317414)
    Thelen2003Muscle glut_med1_l: max_isometric_force=819 optimal_fiber_length=0.03909624
        tendon_slack_length=0.05700012 pennation_angle=0.1396263
      MusclePoint P1: pelvis (-0.029784 0.022192 -0.088257)
      MusclePoint P2: femur_l (-0.0159866 -0.00857996 -0.04069983)
    Thelen2003Muscle glut_med2_l: max_isometric_force=573 optimal_fiber_length=0.06175208
        tendon_slack_length=0.03873208 pennation_angle=0
      MusclePoint P1: pelvis (-0.062415 0.032485 -0.055918)
      MusclePoint P2: femur_l (-0.01891992 -0.00425332 -0.03864651)
    Thelen2003Muscle glut_med3_l: max_isometric_force=653 optimal_fiber_length=0.04721892
        tendon_slack_length=0.03873998 pennation_angle=0.3316126
      MusclePoint P1: pelvis (-0.089279 0.007665 -0.047304)
      MusclePoint P2: femur_l (-0.02265991 -0.00344665 -0.03798651)
    Thelen2003Muscle glut_min1_l: max_isometric_force=270 optimal_fiber_length=0.04973438
        tendon_slack_length=0.01170221 pennation_angle=0.1745329
      MusclePoint P1: pelvis (-0.034091 -0.00584 -0.077088)
      MusclePoint P2: femur_l (-0.00527998 -0.00762664 -0.0410665)
    Thelen2003Muscle glut_min2_l: max_isometric_force=285 optimal_fiber_length=0.04096634
        tendon_slack_length=0.01902009 pennation_angle=0
      MusclePoint P1: pelvis (-0.046209 -0.004745 -0.072343)
      MusclePoint P2: femur_l (-0.00703997 -0.00762664 -0.0410665)
    Thelen2003Muscle glut_min3_l: max_isometric_force=323 optimal_fiber_length=0.02779938
        tendon_slack_length=0.03730969 pennation_angle=0.01745329
      MusclePoint P1: pelvis (-0.060882 -0.004599 -0.062488)
      MusclePoint P2: femur_l (-0.00989996 -0.00608664 -0.04033317)
    Thelen2003Muscle semimem_l: max_isometric_force=1288 optimal_fiber_length=0.05844717 tendon_slack_length=0.2622817
        pennation_angle=0.2617994
      MusclePoint P1: pelvis (-0.087016 -0.0711531 -0.0522023)
      MuscleViaPoint P2: tibia_l (-0.02464839 -0.02492463 0.01339371) range=(-0.5585054 0.1745329)
          coordinate=knee_angle_l
      MusclePoint P3: tibia_l (-0.01912375 -0.03379238 0.01386118)
    Thelen2003Muscle semiten_l: max_isometric_force=410 optimal_fiber_length=0.1462656 tendon_slack_length=0.1859247
        pennation_angle=0.08726646
      MusclePoint P1: pelvis (-0.0922355 -0.0802124 -0.0440847)
      MuscleViaPoint P2: tibia_l (-0.02976931 -0.02024993 0.0161277) range=(-0.3316126 0.1745329)
          coordinate=knee_angle_l
      MusclePoint P3: tibia_l (-0.0235293 -0.03741173 0.01620561)
      MusclePoint P4: tibia_l (-0.00800365 -0.05283823 0.01735304)
      MusclePoint P5: tibia_l (0.00191238 -0.06771226 0.01366994)
    Thelen2003Muscle bifemlh_l: max_isometric_force=896 optimal_fiber_length=0.07957555 tendon_slack_length=0.2379966
        pennation_angle=0
      MusclePoint P1: pelvis (-0.0919508 -0.0748761 -0.0506912)
      MusclePoint P2: tibia_l (-0.02131944 -0.02549834 -0.02084489)
      MusclePoint P3: tibia_l (-0.01657392 -0.03987657 -0.02429425)
    Thelen2003Muscle bifemsh_l: max_isometric_force=804 optimal_fiber_length=0.1257516 tendon_slack_length=0.06469303
        pennation_angle=0.4014257
      MusclePoint P1: femur_l (0.00366665 -0.154806 -0.01715993)
      MusclePoint P2: tibia_l (-0.02131944 -0.02549834 -0.02084489)
      MusclePoint P3: tibia_l (-0.01657392 -0.03987657 -0.02429425)
    Thelen2003Muscle sar_l: max_isometric_force=156 optimal_fiber_length=0.3789175 tendon_slack_length=0.07286875
        pennation_angle=0
      MusclePoint P1: pelvis (-0.011169 -0.000949 -0.090666)
      MusclePoint P2: femur_l (-0.00219999 -0.2616522 0.03087321)
      MusclePoint P3: tibia_l (-0.00396641 -0.02967723 0.02826066)
      MusclePoint P4: tibia_l (0.00424972 -0.04171812 0.0271274)
      MusclePoint P5: tibia_l (0.01721138 -0.05949613 0.01784884)
    Thelen2003Muscle add_long_l: max_isometric_force=627 optimal_fiber_length=0.101161 tendon_slack_length=0.08063557
        pennation_angle=0.1047198
      MusclePoint P1: pelvis (-0.023068 -0.061028 -0.012337)
      MusclePoint P2: femur_l (0.00366665 -0.154806 -0.01715993)
    Thelen2003Muscle add_brev_l: max_isometric_force=429 optimal_fiber_length=0.09743118 tendon_slack_length=0.01465131
        pennation_angle=0
      MusclePoint P1: pelvis (-0.042851 -0.066795 -0.011972)
      MusclePoint P2: femur_l (0.00066 -0.0877063 -0.02155991)
    Thelen2003Muscle add_mag1_l: max_isometric_force=381 optimal_fiber_length=0.06376208 tendon_slack_length=0.04397385
        pennation_angle=0.08726646
      MusclePoint P1: pelvis (-0.053436 -0.085702 -0.018615)
      MusclePoint P2: femur_l (-0.00329999 -0.0888063 -0.0248599)
    Thelen2003Muscle add_mag2_l: max_isometric_force=343 optimal_fiber_length=0.0887892 tendon_slack_length=0.08805541
        pennation_angle=0.05235988
      MusclePoint P1: pelvis (-0.060663 -0.087016 -0.022484)
      MusclePoint P2: femur_l (0.00395998 -0.167566 -0.0166466)
    Thelen2003Muscle add_mag3_l: max_isometric_force=488 optimal_fiber_length=0.09611915 tendon_slack_length=0.1826997
        pennation_angle=0.08726646
      MusclePoint P1: pelvis (-0.0810884 -0.0833149 -0.0356386)
      MusclePoint P2: femur_l (0.00513331 -0.2813788 0.01950659)
    Thelen2003Muscle tfl_l: max_isometric_force=233 optimal_fiber_length=0.06942851 tendon_slack_length=0.3106012
        pennation_angle=0.05235988
      MusclePoint P1: pelvis (-0.022703 0.015622 -0.090593)
      MusclePoint P2: femur_l (0.02155991 -0.07296637 -0.04377982)
      MusclePoint P3: femur_l (0.00395998 -0.2969254 -0.02617989)
      MusclePoint P4: tibia_l (0.00424972 -0.03449359 -0.02103613)
    Thelen2003Muscle pect_l: max_isometric_force=266 optimal_fiber_length=0.07324707 tendon_slack_length=0.02417153
        pennation_angle=0
      MusclePoint P1: pelvis (-0.031463 -0.056064 -0.032923)
      MusclePoint P2: femur_l (-0.00894663 -0.06027975 -0.01855326)
    Thelen2003Muscle grac_l: max_isometric_force=162 optimal_fiber_length=0.2563482 tendon_slack_length=0.091761
        pennation_angle=0.05235988
      MusclePoint P1: pelvis (-0.0540273 -0.086651 -0.0203962)
      MuscleViaPoint P2: tibia_l (-0.01881919 -0.02259436 0.02673076) range=(-0.4363323 0.1745329)
          coordinate=knee_angle_l
      MusclePoint P3: tibia_l (-0.01376202 -0.03649804 0.02535668)
      MusclePoint P4: tibia_l (0.00424972 -0.05921281 0.01614895)
    Thelen2003Muscle glut_max1_l: max_isometric_force=573 optimal_fiber_length=0.1038212 tendon_slack_length=0.09139188
        pennation_angle=0.08726646
      MusclePoint P1: pelvis (-0.087235 0.044676 -0.0511)
      MusclePoint P2: pelvis (-0.094243 0.000876 -0.064678)
      MusclePoint P3: femur_l (-0.03351319 -0.01818659 -0.02874655)
      MusclePoint P4: femur_l (-0.02031325 -0.0415065 -0.03446652)
    Thelen2003Muscle glut_max2_l: max_isometric_force=819 optimal_fiber_length=0.1075422 tendon_slack_length=0.09291061
        pennation_angle=0
      MusclePoint P1: pelvis (-0.098477 0.012848 -0.041099)
      MusclePoint P2: pelvis (-0.100448 -0.03796 -0.066722)
      MusclePoint P3: femur_l (-0.03123987 -0.03886651 -0.02148658)
      MusclePoint P4: femur_l (-0.01143995 -0.07450636 -0.03072654)
    Thelen2003Muscle glut_max3_l: max_isometric_force=552 optimal_fiber_length=0.1053484 tendon_slack_length=0.10608
        pennation_angle=0.08726646
      MusclePoint P1: pelvis (-0.113588 -0.022922 -0.004234)
      MusclePoint P2: pelvis (-0.111617 -0.076796 -0.029419)
      MusclePoint P3: femur_l (-0.02192658 -0.07633968 -0.00989996)
      MusclePoint P4: femur_l (-0.00439998 -0.1040596 -0.03013988)
    Thelen2003Muscle iliacus_l: max_isometric_force=1073 optimal_fiber_length=0.07309827 tendon_slack_length=0.07309827
        pennation_angle=0.1221731
      MusclePoint P1: pelvis (-0.049202 0.026645 -0.062342)
      MusclePoint P2: pelvis (-0.018834 -0.04015 -0.059203)
      MuscleViaPoint P3: pelvis (-0.021024 -0.058765 -0.059568) range=(-1.570796 0.7853982) coordinate=hip_flexion_l
      MusclePoint P4: femur_l (0.00124666 -0.03981984 -0.00417998)
      MusclePoint P5: femur_l (-0.01415327 -0.04553981 -0.00945996)
    Thelen2003Muscle psoas_l: max_isometric_force=1113 optimal_fiber_length=0.07307182 tendon_slack_length=0.1169149
        pennation_angle=0.1396263
      MusclePoint P1: pelvis (-0.047231 0.064751 -0.021097)
      MusclePoint P2: pelvis (-0.017374 -0.04161 -0.055407)
      MuscleViaPoint P3: pelvis (-0.021024 -0.058765 -0.059568) range=(-1.570796 0.7853982) coordinate=hip_flexion_l
      MusclePoint P4: femur_l (0.00117333 -0.03717985 -0.00278666)
      MusclePoint P5: femur_l (-0.01378661 -0.04377982 -0.00762664)
    Thelen2003Muscle quad_fem_l: max_isometric_force=381 optimal_fiber_length=0.03948765 tendon_slack_length=0.01755006
        pennation_angle=0
      MusclePoint P1: pelvis (-0.083439 -0.084023 -0.03796)
      MusclePoint P2: femur_l (-0.02793988 -0.02632656 -0.02683989)
    Thelen2003Muscle gem_l: max_isometric_force=164 optimal_fiber_length=0.01755964 tendon_slack_length=0.02853441
        pennation_angle=0
      MusclePoint P1: pelvis (-0.082709 -0.05986 -0.052122)
      MusclePoint P2: femur_l (-0.01041329 -0.00241999 -0.03248653)
    Thelen2003Muscle peri_l: max_isometric_force=444 optimal_fiber_length=0.01899817 tendon_slack_length=0.08403038
        pennation_angle=0.1745329
      MusclePoint P1: pelvis (-0.101908 0.000219 -0.017155)
      MusclePoint P2: pelvis (-0.087089 -0.020148 -0.047961)
      MusclePoint P3: femur_l (-0.01085329 -0.00263999 -0.03204653)
    Thelen2003Muscle rect_fem_l: max_isometric_force=1169 optimal_fiber_length=0.08369867 tendon_slack_length=0.2276017
        pennation_angle=0.08726646
      MusclePoint P1: pelvis (-0.021535 -0.022703 -0.070664)
      MuscleViaPoint P2: femur_l (0.02449323 -0.2955321 -0.00139333) range=(-2.617994 -1.459968)
          coordinate=knee_angle_l
      MovingMusclePoint P3: tibia_l (0.03263833 0.01679299 -0.0009916) x_coordinate=knee_angle_l
          y_coordinate=knee_angle_l z_coordinate=knee_angle_l
        XAttachment:
          natCubicSpline: min_x=-1000000000000000000000000000000 max_x=1000000000000000000000000000000
              min_y=-1000000000000000000000000000000 max_y=1000000000000000000000000000000
              min_z=-1000000000000000000000000000000 max_z=1000000000000000000000000000000
              x=(-2.094395 -1.999973 -1.570796 -1.457524 -1.396263 -1.047198 -0.6981317 -0.5263913 -0.3490659 -0.1745329 0 0.00017453 0.00034907 0.02792527 0.08726646 0.1745329 2.094395)
              y=(0.01103547 0.01274479 0.01948364 0.02100521 0.02178801 0.02590173 0.02989498 0.03193679 0.03427473 0.03784373 0.04374208 0.04374869 0.04375529 0.04484047 0.04745096 0.0519199 0.04061891)
        YAttachment:
          natCubicSpline: min_x=-1000000000000000000000000000000 max_x=1000000000000000000000000000000
              min_y=-1000000000000000000000000000000 max_y=1000000000000000000000000000000
              min_z=-1000000000000000000000000000000 max_z=1000000000000000000000000000000
              x=(-2.094395 -1.999973 -1.570796 -1.457524 -1.396263 -1.047198 -0.6981317 -0.5263913 -0.3490659 -0.1745329 0 0.00017453 0.00034907 0.02792527 0.08726646 0.1745329 2.094395)
              y=(0.01658215 0.01682983 0.01778802 0.01790513 0.01793003 0.01764939 0.01716698 0.01688892 0.01658789 0.01612373 0.01486272 0.01486088 0.01485904 0.01453581 0.0135817 0.01130103 -0.04772253)
        ZAttachment:
          natCubicSpline: min_x=-1000000000000000000000000000000 max_x=1000000000000000000000000000000
              min_y=-1000000000000000000000000000000 max_y=1000000000000000000000000000000
              min_z=-1000000000000000000000000000000 max_z=1000000000000000000000000000000 x=(-2.0944 0.1745)
              y=(-0.0009916 -0.0009916)
    Thelen2003Muscle vas_med_l: max_isometric_force=1294 optimal_fiber_length=0.06540485 tendon_slack_length=0.09259563
        pennation_angle=0.08726646
      MusclePoint P1: femur_l (0.01026662 -0.153926 -0.01378661)
      MusclePoint P2: femur_l (0.02610656 -0.2030592 -0.00066)
      MuscleViaPoint P3: femur_l (0.02713322 -0.2968521 0.00916663) range=(-2.617994 -1.210037) coordinate=knee_angle_l
      MuscleViaPoint P4: femur_l (0.02009325 -0.312032 0.00960663) range=(-2.617994 -1.780061) coordinate=knee_angle_l
      MovingMusclePoint P5: tibia_l (0.02852378 0.01627497 0.01034099) x_coordinate=knee_angle_l
          y_coordinate=knee_angle_l z_coordinate=knee_angle_l
        XAttachment:
          natCubicSpline: min_x=-1000000000000000000000000000000 max_x=1000000000000000000000000000000
              min_y=-1000000000000000000000000000000 max_y=1000000000000000000000000000000
              min_z=-1000000000000000000000000000000 max_z=1000000000000000000000000000000
              x=(-2.094395 -1.999973 -1.570796 -1.457524 -1.396263 -1.047198 -0.6981317 -0.5263913 -0.3490659 -0.1745329 0 0.00017453 0.00034907 0.02792527 0.08726646 0.1745329 2.094395)
              y=(0.00694898 0.00865831 0.0153961 0.0169175 0.01770027 0.02181233 0.02579492 0.02782652 0.03014855 0.03369777 0.03963476 0.03964149 0.03964822 0.04075617 0.04344406 0.04812833 0.04457476)
        YAttachment:
          natCubicSpline: min_x=-1000000000000000000000000000000 max_x=1000000000000000000000000000000
              min_y=-1000000000000000000000000000000 max_y=1000000000000000000000000000000
              min_z=-1000000000000000000000000000000 max_z=1000000000000000000000000000000
              x=(-2.094395 -1.999973 -1.570796 -1.457524 -1.396263 -1.047198 -0.6981317 -0.5263913 -0.3490659 -0.1745329 0 0.00017453 0.00034907 0.02792527 0.08726646 0.1745329 2.094395)
              y=(0.01587654 0.01612422 0.01708848 0.01720665 0.01723172 0.01696082 0.01654507 0.01633854 0.01617319 0.01603293 0.01543476 0.01543379 0.01543283 0.01525401 0.01465035 0.0129807 -0.04647814)
        ZAttachment:
          natCubicSpline: min_x=-1000000000000000000000000000000 max_x=1000000000000000000000000000000
              min_y=-1000000000000000000000000000000 max_y=1000000000000000000000000000000
              min_z=-1000000000000000000000000000000 max_z=1000000000000000000000000000000 x=(-2.094395 2.094395)
              y=(0.01034099 0.01034099)
    Thelen2003Muscle vas_int_l: max_isometric_force=1365 optimal_fiber_length=0.06394561 tendon_slack_length=0.09996095
        pennation_angle=0.05235988
      MusclePoint P1: femur_l (0.02126658 -0.1410927 -0.02273324)
      MusclePoint P2: femur_l (0.02456657 -0.152826 -0.02089991)
      MuscleViaPoint P3: femur_l (0.02515323 -0.2955321 -0.00403332) range=(-2.617994 -1.42) coordinate=knee_angle_l
      MovingMusclePoint P4: tibia_l (0.03263833 0.01679299 -0.0009916) x_coordinate=knee_angle_l
          y_coordinate=knee_angle_l z_coordinate=knee_angle_l
        XAttachment:
          natCubicSpline: min_x=-1000000000000000000000000000000 max_x=1000000000000000000000000000000
              min_y=-1000000000000000000000000000000 max_y=1000000000000000000000000000000
              min_z=-1000000000000000000000000000000 max_z=1000000000000000000000000000000
              x=(-2.094395 -1.999973 -1.570796 -1.457524 -1.396263 -1.047198 -0.6981317 -0.5263913 -0.3490659 -0.1745329 0 0.00017453 0.00034907 0.02792527 0.08726646 0.1745329 2.094395)
              y=(0.01103547 0.01274479 0.01948364 0.02100521 0.02178801 0.02590173 0.02989498 0.03193679 0.03427473 0.03784373 0.04374208 0.04374869 0.04375529 0.04484047 0.04745096 0.0519199 0.04061891)
        YAttachment:
          natCubicSpline: min_x=-1000000000000000000000000000000 max_x=1000000000000000000000000000000
              min_y=-1000000000000000000000000000000 max_y=1000000000000000000000000000000
              min_z=-1000000000000000000000000000000 max_z=1000000000000000000000000000000
              x=(-2.094395 -1.999973 -1.570796 -1.457524 -1.396263 -1.047198 -0.6981317 -0.5263913 -0.3490659 -0.1745329 0 0.00017453 0.00034907 0.02792527 0.08726646 0.1745329 2.094395)
              y=(0.01658215 0.01682983 0.01778802 0.01790513 0.01793003 0.01764939 0.01716698 0.01688892 0.01658789 0.01612373 0.01486272 0.01486088 0.01485904 0.01453581 0.0135817 0.01130103 -0.04772253)
        ZAttachment:
          natCubicSpline: min_x=-1000000000000000000000000000000 max_x=1000000000000000000000000000000
              min_y=-1000000000000000000000000000000 max_y=1000000000000000000000000000000
              min_z=-1000000000000000000000000000000 max_z=1000000000000000000000000000000 x=(-2.0944 0.1745)
              y=(-0.0009916 -0.0009916)
    Thelen2003Muscle vas_lat_l: max_isometric_force=1871 optimal_fiber_length=0.06168996 tendon_slack_length=0.1153015
        pennation_angle=0.08726646
      MusclePoint P1: femur_l (0.00351999 -0.1359594 -0.02559323)
      MusclePoint P2: femur_l (0.01972659 -0.1900059 -0.02999321)
      MuscleViaPoint P3: femur_l (0.02647322 -0.2955321 -0.01503327) range=(-2.617994 -1.210037)
          coordinate=knee_angle_l
      MuscleViaPoint P4: femur_l (0.01855326 -0.3111521 -0.01349328) range=(-2.617994 -1.920037)
          coordinate=knee_angle_l
      MovingMusclePoint P5: tibia_l (0.03166413 0.01550469 -0.01168674) x_coordinate=knee_angle_l
          y_coordinate=knee_angle_l z_coordinate=knee_angle_l
        XAttachment:
          natCubicSpline: min_x=-1000000000000000000000000000000 max_x=1000000000000000000000000000000
              min_y=-1000000000000000000000000000000 max_y=1000000000000000000000000000000
              min_z=-1000000000000000000000000000000 max_z=1000000000000000000000000000000
              x=(-2.094395 -1.999973 -1.570796 -1.457524 -1.396263 -1.047198 -0.6981317 -0.5263913 -0.3490659 -0.1745329 0 0.00017453 0.00034907 0.02792527 0.08726646 0.1745329 2.094395)
              y=(0.01012122 0.01183055 0.01856741 0.02008865 0.02087138 0.02498194 0.0289537 0.03097279 0.03326856 0.03674186 0.04246586 0.04247225 0.04247865 0.04352974 0.04606355 0.05042063 0.04134738)
        YAttachment:
          natCubicSpline: min_x=-1000000000000000000000000000000 max_x=1000000000000000000000000000000
              min_y=-1000000000000000000000000000000 max_y=1000000000000000000000000000000
              min_z=-1000000000000000000000000000000 max_z=1000000000000000000000000000000
              x=(-2.094395 -1.999973 -1.570796 -1.457524 -1.396263 -1.047198 -0.6981317 -0.5263913 -0.3490659 -0.1745329 0 0.00017453 0.00034907 0.02792527 0.08726646 0.1745329 2.094395)
              y=(0.01525067 0.01549835 0.0164579 0.01657525 0.01660018 0.01632173 0.01585447 0.01559301 0.01532443 0.01494282 0.01387279 0.01387123 0.01386966 0.01359204 0.0127548 0.0107003 -0.046281)
        ZAttachment:
          natCubicSpline: min_x=-1000000000000000000000000000000 max_x=1000000000000000000000000000000
              min_y=-1000000000000000000000000000000 max_y=1000000000000000000000000000000
              min_z=-1000000000000000000000000000000 max_z=1000000000000000000000000000000 x=(-2.094395 2.094395)
              y=(-0.01168674 -0.01168674)
    Thelen2003Muscle med_gas_l: max_isometric_force=1558 optimal_fiber_length=0.04252592 tendon_slack_length=0.2764185
        pennation_angle=0.296706
      MusclePoint P1: femur_l (-0.01393328 -0.2881255 0.01723326)
      MuscleViaPoint P2: femur_l (-0.02199991 -0.2949454 0.01891992) range=(-0.7853982 0.1745329)
          coordinate=knee_angle_l
      MusclePoint P3: calcn_l (0 0.0219569 0.00375392)
    Thelen2003Muscle lat_gas_l: max_isometric_force=683 optimal_fiber_length=0.04534851 tendon_slack_length=0.2692568
        pennation_angle=0.1396263
      MusclePoint P1: femur_l (-0.01613327 -0.2893721 -0.01994658)
      MuscleViaPoint P2: femur_l (-0.02199991 -0.2946521 -0.02009325) range=(-0.7853982 0.1745329)
          coordinate=knee_angle_l
      MusclePoint P3: calcn_l (0 0.0219569 0.00375392)
    Thelen2003Muscle soleus_l: max_isometric_force=3549 optimal_fiber_length=0.03541436 tendon_slack_length=0.1770718
        pennation_angle=0.4363323
      MusclePoint P1: tibia_l (-0.00169989 -0.1085804 -0.00502884)
      MusclePoint P2: calcn_l (0 0.0219569 0.00375392)
    Thelen2003Muscle tib_post_l: max_isometric_force=1588 optimal_fiber_length=0.0219569 tendon_slack_length=0.219569
        pennation_angle=0.2094395
      MusclePoint P1: tibia_l (-0.0066579 -0.09547711 -0.00134575)
      MusclePoint P2: tibia_l (-0.01019934 -0.2869272 0.01621978)
      MusclePoint P3: calcn_l (0.02953558 0.02365679 0.02025701)
      MusclePoint P4: calcn_l (0.05467977 0.01126177 0.01990287)
    Thelen2003Muscle flex_dig_l: max_isometric_force=310 optimal_fiber_length=0.02408176 tendon_slack_length=0.2833149
        pennation_angle=0.1221731
      MusclePoint P1: tibia_l (-0.00587878 -0.1449156 0.00127492)
      MusclePoint P2: tibia_l (-0.01090762 -0.2869272 0.01388243)
      MusclePoint P3: calcn_l (0.03088132 0.02231105 0.01983204)
      MusclePoint P4: calcn_l (0.05014673 0.01246585 0.01862795)
      MusclePoint P5: calcn_l (0.117434 -0.00573713 -0.00821613)
      MusclePoint P6: toes_l (-0.00134575 -0.00552464 -0.01041182)
      MusclePoint P7: toes_l (0.02018619 -0.00502884 -0.01522817)
      MusclePoint P8: toes_l (0.03123547 -0.00424972 -0.01714055)
    Thelen2003Muscle flex_hal_l: max_isometric_force=322 optimal_fiber_length=0.03045635 tendon_slack_length=0.2691491
        pennation_angle=0.1745329
      MusclePoint P1: tibia_l (-0.00559547 -0.1653142 -0.01728221)
      MusclePoint P2: tibia_l (-0.01317414 -0.2889103 0.0123242)
      MusclePoint P3: calcn_l (0.02648994 0.01954873 0.01706972)
      MusclePoint P4: calcn_l (0.07352021 0.00481635 0.01813215)
      MusclePoint P5: calcn_l (0.1222504 -0.00375392 0.01905293)
      MusclePoint P6: toes_l (0.01097845 -0.00453304 0.01876961)
      MusclePoint P7: toes_l (0.03980574 -0.00722453 0.01282)
    Thelen2003Muscle tib_ant_l: max_isometric_force=905 optimal_fiber_length=0.06941215 tendon_slack_length=0.1579481
        pennation_angle=0.08726646
      MusclePoint P1: tibia_l (0.01267834 -0.1150258 -0.0081453)
      MusclePoint P2: tibia_l (0.02330265 -0.2798443 0.01253668)
      MusclePoint P3: calcn_l (0.08258629 0.01260751 0.02160276)
    Thelen2003Muscle per_brev_l: max_isometric_force=435 optimal_fiber_length=0.03541436 tendon_slack_length=0.1140342
        pennation_angle=0.08726646
      MusclePoint P1: tibia_l (-0.00495801 -0.1874128 -0.02301933)
      MusclePoint P2: tibia_l (-0.01402409 -0.2963474 -0.02004453)
      MusclePoint P3: tibia_l (-0.01019934 -0.3042093 -0.0204695)
      MusclePoint P4: calcn_l (0.03336033 0.01912375 -0.01650309)
      MusclePoint P5: calcn_l (0.04795104 0.01551149 -0.02429425)
    Thelen2003Muscle per_long_l: max_isometric_force=943 optimal_fiber_length=0.03470607 tendon_slack_length=0.2443591
        pennation_angle=0.1745329
      MusclePoint P1: tibia_l (0.00035414 -0.1110594 -0.02564)
      MusclePoint P2: tibia_l (-0.01466155 -0.2978348 -0.02025701)
      MusclePoint P3: tibia_l (-0.01147425 -0.3059092 -0.0204695)
      MusclePoint P4: calcn_l (0.03102298 0.01629061 -0.01565315)
      MusclePoint P5: calcn_l (0.04823436 0.00750784 -0.02011536)
      MusclePoint P6: calcn_l (0.06034607 0.00488718 -0.00835779)
      MusclePoint P7: calcn_l (0.08520695 0.00602044 0.01303248)
    Thelen2003Muscle per_tert_l: max_isometric_force=180 optimal_fiber_length=0.05595469 tendon_slack_length=0.07082872
        pennation_angle=0.2268928
      MusclePoint P1: tibia_l (0.00070829 -0.1986037 -0.01636143)
      MusclePoint P2: tibia_l (0.01621978 -0.2882021 -0.01126177)
      MusclePoint P3: calcn_l (0.06070021 0.01614895 -0.02117779)
    Thelen2003Muscle ext_dig_l: max_isometric_force=512 optimal_fiber_length=0.07224529 tendon_slack_length=0.2443591
        pennation_angle=0.1396263
      MusclePoint P1: tibia_l (0.00226652 -0.09781446 -0.01954873)
      MusclePoint P2: tibia_l (0.0204695 -0.2838107 -0.00509967)
      MusclePoint P3: calcn_l (0.06530408 0.02748154 0.00007083)
      MusclePoint P4: calcn_l (0.1144592 0.00389558 -0.00920773)
      MusclePoint P5: toes_l (0.00021249 0.00332895 -0.01083679)
      MusclePoint P6: toes_l (0.03137712 -0.00028331 -0.01770718)
    Thelen2003Muscle ext_hal_l: max_isometric_force=162 optimal_fiber_length=0.07861988 tendon_slack_length=0.2160276
        pennation_angle=0.1047198
      MusclePoint P1: tibia_l (0.00084994 -0.1251543 -0.01614895)
      MusclePoint P2: tibia_l (0.02309016 -0.2822524 0.00602044)
      MusclePoint P3: calcn_l (0.06870386 0.02755237 0.01494486)
      MusclePoint P4: calcn_l (0.09158154 0.02188607 0.01820298)
      MusclePoint P5: calcn_l (0.122817 0.00984519 0.01983204)
      MusclePoint P6: toes_l (0.02110696 0.00290398 0.01735304)
      MusclePoint P7: toes_l (0.03987657 0.00240818 0.01317414)
    Thelen2003Muscle ercspn_r: max_isometric_force=2500 optimal_fiber_length=0.0876 tendon_slack_length=0.0219
        pennation_angle=0
      MusclePoint P1: pelvis (-0.1022 0.032047 0.031828)
      MusclePoint P2: torso (-0.04015 0.0803 0.017593)
    Thelen2003Muscle ercspn_l: max_isometric_force=2500 optimal_fiber_length=0.0876 tendon_slack_length=0.0219
        pennation_angle=0
      MusclePoint P1: pelvis (-0.1022 0.032047 -0.031828)
      MusclePoint P2: torso (-0.04015 0.0803 -0.017593)
    Thelen2003Muscle intobl_r: max_isometric_force=900 optimal_fiber_length=0.073 tendon_slack_length=0.073
        pennation_angle=0
      MusclePoint P1: pelvis (-0.0292 0.0511 0.084461)
      MusclePoint P2: torso (0.0511 0.1168 0.01095)
    Thelen2003Muscle intobl_l: max_isometric_force=900 optimal_fiber_length=0.073 tendon_slack_length=0.073
        pennation_angle=0
      MusclePoint P1: pelvis (-0.0292 0.0511 -0.084461)
      MusclePoint P2: torso (0.0511 0.1168 -0.01095)
    Thelen2003Muscle extobl_r: max_isometric_force=900 optimal_fiber_length=0.0876 tendon_slack_length=0.1022
        pennation_angle=0
      MusclePoint P1: pelvis (-0.0219 -0.046428 0.0073)
      MusclePoint P2: torso (0.04745 0.0803 0.0803)
    Thelen2003Muscle extobl_l: max_isometric_force=900 optimal_fiber_length=0.0876 tendon_slack_length=0.1022
        pennation_angle=0
      MusclePoint P1: pelvis (-0.0219 -0.046428 -0.0073)
      MusclePoint P2: torso (0.04745 0.0803 -0.0803)
    ObjectGroup R_hip_abd: members=(glut_max1_r glut_med1_r glut_med2_r glut_med3_r glut_min1_r glut_min2_r glut_min3_r peri_r sar_r tfl_r)
    ObjectGroup R_hip_flex: members=(add_brev_r add_long_r glut_med1_r glut_min1_r grac_r iliacus_r pect_r psoas_r rect_fem_r sar_r tfl_r)
    ObjectGroup R_hip_inrot: members=(glut_med1_r glut_min1_r iliacus_r psoas_r tfl_r)
    ObjectGroup R_hip_exrot: members=(gem_r glut_med3_r glut_min3_r peri_r quad_fem_r)
    ObjectGroup R_hip_ext: members=(add_long_r add_mag1_r add_mag2_r add_mag3_r bifemlh_r glut_max1_r glut_max2_r glut_max3_r glut_med3_r glut_min3_r semimem_r semiten_r)
    ObjectGroup R_hip_add: members=(add_brev_r add_long_r add_mag1_r add_mag2_r add_mag3_r bifemlh_r grac_r pect_r semimem_r semiten_r)
    ObjectGroup R_knee_bend: members=(bifemlh_r bifemsh_r grac_r lat_gas_r med_gas_r sar_r semimem_r semiten_r)
    ObjectGroup R_knee_ext: members=(rect_fem_r vas_int_r vas_lat_r vas_med_r)
    ObjectGroup R_ankle_pf: members=(flex_dig_r flex_hal_r lat_gas_r med_gas_r per_brev_r per_long_r soleus_r tib_post_r)
    ObjectGroup R_inverter: members=(ext_hal_r flex_dig_r flex_hal_r tib_ant_r tib_post_r)
    ObjectGroup R_ankle_df: members=(ext_dig_r ext_hal_r per_tert_r tib_ant_r)
    ObjectGroup R_everter: members=(ext_dig_r per_brev_r per_long_r per_tert_r)
    ObjectGroup L_hip_abd: members=(glut_max1_l glut_med1_l glut_med2_l glut_med3_l glut_min1_l glut_min2_l glut_min3_l peri_l sar_l tfl_l)
    ObjectGroup L_hip_flex: members=(add_brev_l add_long_l glut_med1_l glut_min1_l grac_l iliacus_l pect_l psoas_l rect_fem_l sar_l tfl_l)
    ObjectGroup L_hip_inrot: members=(glut_med1_l glut_min1_l iliacus_l psoas_l tfl_l)
    ObjectGroup L_hip_exrot: members=(gem_l glut_med3_l glut_min3_l peri_l quad_fem_l)
    ObjectGroup L_hip_ext: members=(add_long_l add_mag1_l add_mag2_l add_mag3_l bifemlh_l glut_max1_l glut_max2_l glut_max3_l glut_med3_l glut_min3_l semimem_l semiten_l)
    ObjectGroup L_hip_add: members=(add_brev_l add_long_l add_mag1_l add_mag2_l add_mag3_l bifemlh_l grac_l pect_l semimem_l semiten_l)
    ObjectGroup L_knee_bend: members=(bifemlh_l bifemsh_l grac_l lat_gas_l med_gas_l sar_l semimem_l semiten_l)
    ObjectGroup L_knee_ext: members=(rect_fem_l vas_int_l vas_lat_l vas_med_l)
    ObjectGroup L_ankle_pf: members=(flex_dig_l flex_hal_l lat_gas_l med_gas_l per_brev_l per_long_l soleus_l tib_post_l)
    ObjectGroup L_inverter: members=(ext_hal_l flex_dig_l flex_hal_l tib_ant_l tib_post_l)
    ObjectGroup L_ankle_df: members=(ext_dig_l ext_hal_l per_tert_l tib_ant_l)
    ObjectGroup L_everter: members=(ext_dig_l per_brev_l per_long_l per_tert_l)
    ObjectGroup back_ext: members=(ercspn_l ercspn_r)
    ObjectGroup back_rlb: members=(ercspn_r extobl_r intobl_r)
    ObjectGroup back_introt: members=(ercspn_r extobl_l intobl_r)
    ObjectGroup back_llb: members=(ercspn_l extobl_l intobl_l)
    ObjectGroup back_extrot: members=(ercspn_l extobl_r intobl_l)
    ObjectGroup back_flex: members=(extobl_l extobl_r intobl_l intobl_r)
