# OpenSim document version 30000
Model 7374_pre:
  credits: Model authors names..
  publications: List of publications related to model...
  length_units: meters
  force_units: N
  gravity: 0 -9.80665 0
  defaults: Thelen2003Muscle default: max_isometric_force=546 optimal_fiber_length=0.0535 tendon_slack_length=0.078
      pennation_angle_at_optimal=0 [radians] activation_time_constant=0.01 deactivation_time_constant=0.04
      FmaxTendonStrain=0.033 FmaxMuscleStrain=0.6 KshapeActive=0.5 KshapePassive=4 Af=0.3 Flen=1.8
  BodySet:
    Body ground: mass=0 mass_center=(0 0 0) inertia_xx=0 inertia_yy=0 inertia_zz=0 meshes=treadmill.vtp
    Body pelvis: mass=4.457461 mass_center=(-0.051611 0 0) inertia_xx=0.02073441 inertia_yy=0.01756777
        inertia_zz=0.01167823 meshes=(sacrum.vtp pelvis.vtp l_pelvis.vtp)
      CustomJoint ground_pelvis: parent_body=ground location_in_parent=(0 0 0) location=(0 0 0)
        Coordinate pelvis_tilt: motion_type=rotational default_value=0 range=(-1.570796 1.570796) clamped=true
            locked=true
        Coordinate pelvis_list: motion_type=rotational default_value=0 range=(-1.570796 1.570796) clamped=true
            locked=true
        Coordinate pelvis_rotation: motion_type=rotational default_value=0 range=(-1.570796 1.570796) clamped=true
            locked=true
        Coordinate pelvis_tx: motion_type=translational default_value=0 range=(-5 5) clamped=true locked=true
        Coordinate pelvis_ty: motion_type=translational default_value=0.93 range=(-1 2) clamped=true locked=true
        Coordinate pelvis_tz: motion_type=translational default_value=0 range=(-3 3) clamped=true locked=true
        SpatialTransform:
          TransformAxis rotation1: coordinates=pelvis_tilt axis=(0 0 1) LinearFunction(coefficients=1 0)
          TransformAxis rotation2: coordinates=pelvis_list axis=(1 0 0) LinearFunction(coefficients=1 0)
          TransformAxis rotation3: coordinates=pelvis_rotation axis=(0 1 0) LinearFunction(coefficients=1 0)
          TransformAxis translation1: coordinates=pelvis_tx axis=(1 0 0) LinearFunction(coefficients=1 0)
          TransformAxis translation2: coordinates=pelvis_ty axis=(0 1 0) LinearFunction(coefficients=1 0)
          TransformAxis translation3: coordinates=pelvis_tz axis=(0 0 1) LinearFunction(coefficients=1 0)
    Body femur_r: mass=3.568876 mass_center=(0 -0.124666 0) inertia_xx=0.02762886 inertia_yy=0.00724252
        inertia_zz=0.02913514 meshes=femur.vtp
      CustomJoint hip_r: parent_body=pelvis location_in_parent=(-0.051611 -0.048253 0.060955) location=(0 0 0)
        Coordinate hip_flexion_r: motion_type=rotational default_value=0 range=(-2.094395 2.094395) clamped=true
        Coordinate hip_adduction_r: motion_type=rotational default_value=0 range=(-2.094395 2.094395) clamped=true
        Coordinate hip_rotation_r: motion_type=rotational default_value=0 range=(-2.094395 2.094395) clamped=true
        SpatialTransform: axes_held_at_zero=(translation1 translation2 translation3)
          TransformAxis rotation1: coordinates=hip_flexion_r axis=(0 0 1) LinearFunction(coefficients=1 0)
          TransformAxis rotation2: coordinates=hip_adduction_r axis=(1 0 0) LinearFunction(coefficients=1 0)
          TransformAxis rotation3: coordinates=hip_rotation_r axis=(0 1 0) LinearFunction(coefficients=1 0)
    Body tibia_r: mass=1.281721 mass_center=(0 -0.132237 0) inertia_xx=0.00874101 inertia_yy=0.00088451
        inertia_zz=0.00886242 meshes=(tibia.vtp fibula.vtp)
      CustomJoint knee_r: parent_body=femur_r location_in_parent=(0 0 0) location=(0 0 0)
        Coordinate knee_angle_r: motion_type=rotational default_value=0 range=(-2.094395 0.1745329) clamped=true
        SpatialTransform: axes_held_at_zero=(rotation2 rotation3 translation3)
          TransformAxis rotation1: coordinates=knee_angle_r axis=(0 0 1) LinearFunction(coefficients=1 0)
          TransformAxis translation1: coordinates=knee_angle_r axis=(1 0 0)
            SimmSpline: x=(-2.0944 -1.74533 -1.39626 -1.0472 -0.698132 -0.349066 -0.174533 0.197344 0.337395 0.490178 1.52146 2.0944)
                y=(-0.00234666 0.00131266 0.00301399 0.00300665 0.00155466 -0.00073333 -0.00227332 -0.00383312 -0.00398565 -0.00408758 -0.00398565 -0.00384998)
          TransformAxis translation2: coordinates=knee_angle_r axis=(0 1 0)
            SimmSpline: x=(-2.0944 -1.22173 -0.523599 -0.349066 -0.174533 0.159149 2.0944)
                y=(-0.309905 -0.299345 -0.292599 -0.291572 -0.290839 -0.289859 -0.290399)
    Body talus_r: mass=0.03457104 mass_center=(0 0 0) inertia_xx=0.00017343 inertia_yy=0.00017343 inertia_zz=0.00017343
        meshes=talus.vtp
      CustomJoint ankle_r: parent_body=tibia_r location_in_parent=(0 -0.3045635 0) location=(0 0 0)
        Coordinate ankle_angle_r: motion_type=rotational default_value=0 range=(-1.570796 1.570796) clamped=true
        SpatialTransform: axes_held_at_zero=(rotation2 rotation3 translation1 translation2 translation3)
          TransformAxis rotation1: coordinates=ankle_angle_r axis=(-0.1050135 -0.1740224 0.9791263)
              LinearFunction(coefficients=1 0)
    Body calcn_r: mass=0.432138 mass_center=(0.0708287 0.0212486 0) inertia_xx=0.00024281 inertia_yy=0.00067639
        inertia_zz=0.00071107 meshes=foot.vtp
      CustomJoint subtalar_r: parent_body=talus_r location_in_parent=(-0.03454317 -0.02971265 0.00560963)
          location=(0 0 0)
        Coordinate subtalar_angle_r: motion_type=rotational default_value=0 range=(-1.570796 1.570796) clamped=true
            locked=true
        SpatialTransform: axes_held_at_zero=(rotation2 rotation3 translation1 translation2 translation3)
          TransformAxis rotation1: coordinates=subtalar_angle_r axis=(0.7871796 0.6047475 -0.1209495)
              LinearFunction(coefficients=1 0)
    Body toes_r: mass=0.07488087 mass_center=(0.0245067 0.00424972 -0.012395) inertia_xx=1.734e-5 inertia_yy=3.469e-5
        inertia_zz=0.00017343 meshes=bofoot.vtp
      CustomJoint mtp_r: parent_body=calcn_r location_in_parent=(0.1266417 -0.00141657 0.00076495) location=(0 0 0)
        Coordinate mtp_angle_r: motion_type=rotational default_value=0 range=(-1.570796 1.570796) clamped=true
            locked=true
        SpatialTransform: axes_held_at_zero=(rotation2 rotation3 translation1 translation2 translation3)
          TransformAxis rotation1: coordinates=mtp_angle_r axis=(-0.5809544 0 0.8139361)
              LinearFunction(coefficients=1 0)
    Body femur_l: mass=3.568876 mass_center=(0 -0.124666 0) inertia_xx=0.02762886 inertia_yy=0.00724252
        inertia_zz=0.02913514 meshes=l_femur.vtp
      CustomJoint hip_l: parent_body=pelvis location_in_parent=(-0.051611 -0.048253 -0.060955) location=(0 0 0)
        Coordinate hip_flexion_l: motion_type=rotational default_value=0 range=(-2.094395 2.094395) clamped=true
        Coordinate hip_adduction_l: motion_type=rotational default_value=0 range=(-2.094395 2.094395) clamped=true
        Coordinate hip_rotation_l: motion_type=rotational default_value=0 range=(-2.094395 2.094395) clamped=true
        SpatialTransform: axes_held_at_zero=(translation1 translation2 translation3)
          TransformAxis rotation1: coordinates=hip_flexion_l axis=(0 0 1) LinearFunction(coefficients=1 0)
          TransformAxis rotation2: coordinates=hip_adduction_l axis=(-1 0 0) LinearFunction(coefficients=1 0)
          TransformAxis rotation3: coordinates=hip_rotation_l axis=(0 -1 0) LinearFunction(coefficients=1 0)
    Body tibia_l: mass=1.281721 mass_center=(0 -0.132237 0) inertia_xx=0.00874101 inertia_yy=0.00088451
        inertia_zz=0.00886242 meshes=(l_tibia.vtp l_fibula.vtp)
      CustomJoint knee_l: parent_body=femur_l location_in_parent=(0 0 0) location=(0 0 0)
        Coordinate knee_angle_l: motion_type=rotational default_value=0 range=(-2.094395 0.1745329) clamped=true
        SpatialTransform: axes_held_at_zero=(rotation2 rotation3 translation3)
          TransformAxis rotation1: coordinates=knee_angle_l axis=(0 0 1) LinearFunction(coefficients=1 0)
          TransformAxis translation1: coordinates=knee_angle_l axis=(1 0 0)
            SimmSpline: x=(-2.0944 -1.74533 -1.39626 -1.0472 -0.698132 -0.349066 -0.174533 0.197344 0.337395 0.490178 1.52146 2.0944)
                y=(-0.00234666 0.00131266 0.00301399 0.00300665 0.00155466 -0.00073333 -0.00227332 -0.00383312 -0.00398565 -0.00408758 -0.00398565 -0.00384998)
          TransformAxis translation2: coordinates=knee_angle_l axis=(0 1 0)
            SimmSpline: x=(-2.0944 -1.22173 -0.523599 -0.349066 -0.174533 0.159149 2.0944)
                y=(-0.309905 -0.299345 -0.292599 -0.291572 -0.290839 -0.289859 -0.290399)
    Body talus_l: mass=0.03457104 mass_center=(0 0 0) inertia_xx=0.00017343 inertia_yy=0.00017343 inertia_zz=0.00017343
        meshes=l_talus.vtp
      CustomJoint ankle_l: parent_body=tibia_l location_in_parent=(0 -0.3045635 0) location=(0 0 0)
        Coordinate ankle_angle_l: motion_type=rotational default_value=0 range=(-1.047198 1.047198) clamped=true
        SpatialTransform: axes_held_at_zero=(rotation2 rotation3 translation1 translation2 translation3)
          TransformAxis rotation1: coordinates=ankle_angle_l axis=(0.1050135 -0.1740224 0.9791263)
              LinearFunction(coefficients=1 0)
    Body calcn_l: mass=0.432138 mass_center=(0.0708287 0.0212486 0) inertia_xx=0.00024281 inertia_yy=0.00067639
        inertia_zz=0.00071107 meshes=l_foot.vtp
      CustomJoint subtalar_l: parent_body=talus_l location_in_parent=(-0.03454317 -0.02971265 -0.00560963)
          location=(0 0 0)
        Coordinate subtalar_angle_l: motion_type=rotational default_value=0 range=(-1.570796 1.570796) clamped=true
            locked=true
        SpatialTransform: axes_held_at_zero=(rotation2 rotation3 translation1 translation2 translation3)
          TransformAxis rotation1: coordinates=subtalar_angle_l axis=(-0.7871796 -0.6047475 -0.1209495)
              LinearFunction(coefficients=1 0)
    Body toes_l: mass=0.07488087 mass_center=(0.0245067 0.00424972 0.012395) inertia_xx=1.734e-5 inertia_yy=3.469e-5
        inertia_zz=0.00017343 meshes=l_bofoot.vtp
      CustomJoint mtp_l: parent_body=calcn_l location_in_parent=(0.1266417 -0.00141657 -0.00076495) location=(0 0 0)
        Coordinate mtp_angle_l: motion_type=rotational default_value=0 range=(-1.047198 1.047198) clamped=true
            locked=true
        SpatialTransform: axes_held_at_zero=(rotation2 rotation3 translation1 translation2 translation3)
          TransformAxis rotation1: coordinates=mtp_angle_l axis=(0.5809544 0 0.8139361)
              LinearFunction(coefficients=1 0)
    Body torso: mass=12.95816 mass_center=(-0.0219 0.2336 0) inertia_xx=0.2974016 inertia_yy=0.1523818
        inertia_zz=0.2887085 meshes=(hat_spine.vtp hat_jaw.vtp hat_skull.vtp hat_ribs.vtp)
      CustomJoint back: parent_body=pelvis location_in_parent=(-0.073511 0.059495 0) location=(0 0 0)
        Coordinate lumbar_extension: motion_type=rotational default_value=0 range=(-1.570796 1.570796) clamped=true
        Coordinate lumbar_bending: motion_type=rotational default_value=0 range=(-1.570796 1.570796) clamped=true
        Coordinate lumbar_rotation: motion_type=rotational default_value=0 range=(-1.570796 1.570796) clamped=true
        SpatialTransform: axes_held_at_zero=(translation1 translation2 translation3)
          TransformAxis rotation1: coordinates=lumbar_extension axis=(0 0 1) LinearFunction(coefficients=1 0)
          TransformAxis rotation2: coordinates=lumbar_bending axis=(1 0 0) LinearFunction(coefficients=1 0)
          TransformAxis rotation3: coordinates=lumbar_rotation axis=(0 1 0) LinearFunction(coefficients=1 0)
  ForceSet:
    Thelen2003Muscle [values shared by the 92 below unless stated]: activation_time_constant=0.01
        deactivation_time_constant=0.04 FmaxTendonStrain=0.033 FmaxMuscleStrain=0.6 KshapeActive=0.5 KshapePassive=4
        Af=0.3 Flen=1.8
    Thelen2003Muscle glut_med1_r: max_isometric_force=819 optimal_fiber_length=0.03909624
        tendon_slack_length=0.05700012 pennation_angle_at_optimal=0.1396263
      PathPoint P1: pelvis (-0.029784 0.022192 0.088257)
      PathPoint P2: femur_r (-0.0159866 -0.00857996 0.0406998)
    Thelen2003Muscle glut_med2_r: max_isometric_force=573 optimal_fiber_length=0.06175208
        tendon_slack_length=0.03873208 pennation_angle_at_optimal=0
      PathPoint P1: pelvis (-0.062415 0.032485 0.055918)
      PathPoint P2: femur_r (-0.0189199 -0.00425332 0.0386465)
    Thelen2003Muscle glut_med3_r: max_isometric_force=653 optimal_fiber_length=0.04721892
        tendon_slack_length=0.03873998 pennation_angle_at_optimal=0.3316126
      PathPoint P1: pelvis (-0.089279 0.007665 0.047304)
      PathPoint P2: femur_r (-0.0226599 -0.00344665 0.0379865)
    Thelen2003Muscle glut_min1_r: max_isometric_force=270 optimal_fiber_length=0.04973438
        tendon_slack_length=0.01170221 pennation_angle_at_optimal=0.1745329
      PathPoint P1: pelvis (-0.034091 -0.00584 0.077088)
      PathPoint P2: femur_r (-0.00527998 -0.00762664 0.0410665)
    Thelen2003Muscle glut_min2_r: max_isometric_force=285 optimal_fiber_length=0.04096634
        tendon_slack_length=0.01902009 pennation_angle_at_optimal=0
      PathPoint P1: pelvis (-0.046209 -0.004745 0.072343)
      PathPoint P2: femur_r (-0.00703997 -0.00762664 0.0410665)
    Thelen2003Muscle glut_min3_r: max_isometric_force=323 optimal_fiber_length=0.02779938
        tendon_slack_length=0.03730969 pennation_angle_at_optimal=0.01745329
      PathPoint P1: pelvis (-0.060882 -0.004599 0.062488)
      PathPoint P2: femur_r (-0.00989996 -0.00608664 0.0403332)
    Thelen2003Muscle semimem_r: max_isometric_force=1288 optimal_fiber_length=0.05844717 tendon_slack_length=0.2622817
        pennation_angle_at_optimal=0.2617994
      PathPoint P1: pelvis (-0.087016 -0.0711531 0.0522023)
      ConditionalPathPoint P2: tibia_r (-0.0246484 -0.0249246 -0.0133937) range=(-0.558505 0.174533)
          coordinate=knee_angle_r
      PathPoint P3: tibia_r (-0.0191237 -0.0337924 -0.0138612)
    Thelen2003Muscle semiten_r: max_isometric_force=410 optimal_fiber_length=0.1462656 tendon_slack_length=0.1859247
        pennation_angle_at_optimal=0.08726646
      PathPoint P1: pelvis (-0.0922355 -0.0802124 0.0440847)
      ConditionalPathPoint P2: tibia_r (-0.0297693 -0.0202499 -0.0161277) range=(-0.331613 0.174533)
          coordinate=knee_angle_r
      PathPoint P3: tibia_r (-0.0235293 -0.0374117 -0.0162056)
      PathPoint P4: tibia_r (-0.00800365 -0.0528382 -0.017353)
      PathPoint P5: tibia_r (0.00191238 -0.0677123 -0.0136699)
    Thelen2003Muscle bifemlh_r: max_isometric_force=896 optimal_fiber_length=0.07957555 tendon_slack_length=0.2379966
        pennation_angle_at_optimal=0
      PathPoint P1: pelvis (-0.0919508 -0.0748761 0.0506912)
      PathPoint P2: tibia_r (-0.0213194 -0.0254983 0.0208449)
      PathPoint P3: tibia_r (-0.0165739 -0.0398766 0.0242943)
    Thelen2003Muscle bifemsh_r: max_isometric_force=804 optimal_fiber_length=0.1257516 tendon_slack_length=0.06469303
        pennation_angle_at_optimal=0.4014257
      PathPoint P1: femur_r (0.00366665 -0.154806 0.0171599)
      PathPoint P2: tibia_r (-0.0213194 -0.0254983 0.0208449)
      PathPoint P3: tibia_r (-0.0165739 -0.0398766 0.0242943)
    Thelen2003Muscle sar_r: max_isometric_force=156 optimal_fiber_length=0.3789175 tendon_slack_length=0.07286875
        pennation_angle_at_optimal=0
      PathPoint P1: pelvis (-0.011169 -0.000949 0.090666)
      PathPoint P2: femur_r (-0.00219999 -0.261652 -0.0308732)
      PathPoint P3: tibia_r (-0.00396641 -0.0296772 -0.0282607)
      PathPoint P4: tibia_r (0.00424972 -0.0417181 -0.0271274)
      PathPoint P5: tibia_r (0.0172114 -0.0594961 -0.0178488)
    Thelen2003Muscle add_long_r: max_isometric_force=627 optimal_fiber_length=0.101161 tendon_slack_length=0.08063557
        pennation_angle_at_optimal=0.1047198
      PathPoint P1: pelvis (-0.023068 -0.061028 0.012337)
      PathPoint P2: femur_r (0.00366665 -0.154806 0.0171599)
    Thelen2003Muscle add_brev_r: max_isometric_force=429 optimal_fiber_length=0.09743118 tendon_slack_length=0.01465131
        pennation_angle_at_optimal=0
      PathPoint P1: pelvis (-0.042851 -0.066795 0.011972)
      PathPoint P2: femur_r (0.00066 -0.0877063 0.0215599)
    Thelen2003Muscle add_mag1_r: max_isometric_force=381 optimal_fiber_length=0.06376208 tendon_slack_length=0.04397385
        pennation_angle_at_optimal=0.08726646
      PathPoint P1: pelvis (-0.053436 -0.085702 0.018615)
      PathPoint P2: femur_r (-0.00329999 -0.0888063 0.0248599)
    Thelen2003Muscle add_mag2_r: max_isometric_force=343 optimal_fiber_length=0.0887892 tendon_slack_length=0.08805541
        pennation_angle_at_optimal=0.05235988
      PathPoint P1: pelvis (-0.060663 -0.087016 0.022484)
      PathPoint P2: femur_r (0.00395998 -0.167566 0.0166466)
    Thelen2003Muscle add_mag3_r: max_isometric_force=488 optimal_fiber_length=0.09611915 tendon_slack_length=0.1826997
        pennation_angle_at_optimal=0.08726646
      PathPoint P1: pelvis (-0.0810884 -0.0833149 0.0356386)
      PathPoint P2: femur_r (0.00513331 -0.281379 -0.0195066)
    Thelen2003Muscle tfl_r: max_isometric_force=233 optimal_fiber_length=0.06942851 tendon_slack_length=0.3106012
        pennation_angle_at_optimal=0.05235988
      PathPoint P1: pelvis (-0.022703 0.015622 0.090593)
      PathPoint P2: femur_r (0.0215599 -0.0729664 0.0437798)
      PathPoint P3: femur_r (0.00395998 -0.296925 0.0261799)
      PathPoint P4: tibia_r (0.00424972 -0.0344936 0.0210361)
    Thelen2003Muscle pect_r: max_isometric_force=266 optimal_fiber_length=0.07324707 tendon_slack_length=0.02417153
        pennation_angle_at_optimal=0
      PathPoint P1: pelvis (-0.031463 -0.056064 0.032923)
      PathPoint P2: femur_r (-0.00894663 -0.0602798 0.0185533)
    Thelen2003Muscle grac_r: max_isometric_force=162 optimal_fiber_length=0.2563482 tendon_slack_length=0.091761
        pennation_angle_at_optimal=0.05235988
      PathPoint P1: pelvis (-0.0540273 -0.086651 0.0203962)
      ConditionalPathPoint P2: tibia_r (-0.0188192 -0.0225944 -0.0267308) range=(-0.436332 0.174533)
          coordinate=knee_angle_r
      PathPoint P3: tibia_r (-0.013762 -0.036498 -0.0253567)
      PathPoint P4: tibia_r (0.00424972 -0.0592128 -0.0161489)
    Thelen2003Muscle glut_max1_r: max_isometric_force=573 optimal_fiber_length=0.1038212 tendon_slack_length=0.09139188
        pennation_angle_at_optimal=0.08726646
      PathPoint P1: pelvis (-0.087235 0.044676 0.0511)
      PathPoint P2: pelvis (-0.094243 0.000876 0.064678)
      PathPoint P3: femur_r (-0.0335132 -0.0181866 0.0287465)
      PathPoint P4: femur_r (-0.0203133 -0.0415065 0.0344665)
    Thelen2003Muscle glut_max2_r: max_isometric_force=819 optimal_fiber_length=0.1075422 tendon_slack_length=0.09291061
        pennation_angle_at_optimal=0
      PathPoint P1: pelvis (-0.098477 0.012848 0.041099)
      PathPoint P2: pelvis (-0.100448 -0.03796 0.066722)
      PathPoint P3: femur_r (-0.0312399 -0.0388665 0.0214866)
      PathPoint P4: femur_r (-0.01144 -0.0745064 0.0307265)
    Thelen2003Muscle glut_max3_r: max_isometric_force=552 optimal_fiber_length=0.1053484 tendon_slack_length=0.10608
        pennation_angle_at_optimal=0.08726646
      PathPoint P1: pelvis (-0.113588 -0.022922 0.004234)
      PathPoint P2: pelvis (-0.111617 -0.076796 0.029419)
      PathPoint P3: femur_r (-0.0219266 -0.0763397 0.00989996)
      PathPoint P4: femur_r (-0.00439998 -0.10406 0.0301399)
    Thelen2003Muscle iliacus_r: max_isometric_force=1073 optimal_fiber_length=0.07309827 tendon_slack_length=0.07309827
        pennation_angle_at_optimal=0.1221731
      PathPoint P1: pelvis (-0.049202 0.026645 0.062342)
      PathPoint P2: pelvis (-0.018834 -0.04015 0.059203)
      ConditionalPathPoint P3: pelvis (-0.021024 -0.058765 0.059568) range=(-1.5708 0.785398) coordinate=hip_flexion_r
      PathPoint P4: femur_r (0.00124666 -0.0398198 0.00417998)
      PathPoint P5: femur_r (-0.0141533 -0.0455398 0.00945996)
    Thelen2003Muscle psoas_r: max_isometric_force=1113 optimal_fiber_length=0.07307182 tendon_slack_length=0.1169149
        pennation_angle_at_optimal=0.1396263
      PathPoint P1: pelvis (-0.047231 0.064751 0.021097)
      PathPoint P2: pelvis (-0.017374 -0.04161 0.055407)
      ConditionalPathPoint P3: pelvis (-0.021024 -0.058765 0.059568) range=(-1.5708 0.785398) coordinate=hip_flexion_r
      PathPoint P4: femur_r (0.00117333 -0.0371799 0.00278666)
      PathPoint P5: femur_r (-0.0137866 -0.0437798 0.00762664)
    Thelen2003Muscle quad_fem_r: max_isometric_force=381 optimal_fiber_length=0.03948765 tendon_slack_length=0.01755006
        pennation_angle_at_optimal=0
      PathPoint P1: pelvis (-0.083439 -0.084023 0.03796)
      PathPoint P2: femur_r (-0.0279399 -0.0263266 0.0268399)
    Thelen2003Muscle gem_r: max_isometric_force=164 optimal_fiber_length=0.01755964 tendon_slack_length=0.02853441
        pennation_angle_at_optimal=0
      PathPoint P1: pelvis (-0.082709 -0.05986 0.052122)
      PathPoint P2: femur_r (-0.0104133 -0.00241999 0.0324865)
    Thelen2003Muscle peri_r: max_isometric_force=444 optimal_fiber_length=0.01899817 tendon_slack_length=0.08403038
        pennation_angle_at_optimal=0.1745329
      PathPoint P1: pelvis (-0.101908 0.000219 0.017155)
      PathPoint P2: pelvis (-0.087089 -0.020148 0.047961)
      PathPoint P3: femur_r (-0.0108533 -0.00263999 0.0320465)
    Thelen2003Muscle rect_fem_r: max_isometric_force=1169 optimal_fiber_length=0.08369867 tendon_slack_length=0.2276017
        pennation_angle_at_optimal=0.08726646
      PathPoint P1: pelvis (-0.021535 -0.022703 0.070664)
      ConditionalPathPoint P2: femur_r (0.0244932 -0.295532 0.00139333) range=(-2.61799 -1.45997)
          coordinate=knee_angle_r
      MovingPathPoint P3: tibia_r (0.0437421 0.0148627 0.0009916) x_coordinate=knee_angle_r y_coordinate=knee_angle_r
          z_coordinate=knee_angle_r
        x_location: SimmSpline: x=(-2.0944 -1.99997 -1.5708 -1.45752 -1.39626 -1.0472 -0.698132 -0.526391 -0.349066 -0.174533 0 0.00017453 0.00034907 0.0279253 0.0872665 0.174533 2.0944)
            y=(0.0110355 0.0127448 0.0194836 0.0210052 0.021788 0.0259017 0.029895 0.0319368 0.0342747 0.0378437 0.0437421 0.0437487 0.0437553 0.0448405 0.047451 0.0519199 0.0406189)
        y_location: SimmSpline: x=(-2.0944 -1.99997 -1.5708 -1.45752 -1.39626 -1.0472 -0.698132 -0.526391 -0.349066 -0.174533 0 0.00017453 0.00034907 0.0279253 0.0872665 0.174533 2.0944)
            y=(0.0165822 0.0168298 0.017788 0.0179051 0.01793 0.0176494 0.017167 0.0168889 0.0165879 0.0161237 0.0148627 0.0148609 0.014859 0.0145358 0.0135817 0.011301 -0.0477225)
        z_location: SimmSpline: x=(-2.0944 0.1745) y=(0.0009916 0.0009916)
    Thelen2003Muscle vas_med_r: max_isometric_force=1294 optimal_fiber_length=0.06540485 tendon_slack_length=0.09259563
        pennation_angle_at_optimal=0.08726646
      PathPoint P1: femur_r (0.0102666 -0.153926 0.0137866)
      PathPoint P2: femur_r (0.0261066 -0.203059 0.00066)
      ConditionalPathPoint P3: femur_r (0.0271332 -0.296852 -0.00916663) range=(-2.61799 -1.21004)
          coordinate=knee_angle_r
      ConditionalPathPoint P4: femur_r (0.0200933 -0.312032 -0.00960663) range=(-2.61799 -1.78006)
          coordinate=knee_angle_r
      MovingPathPoint P5: tibia_r (0.0396348 0.0154348 -0.010341) x_coordinate=knee_angle_r y_coordinate=knee_angle_r
          z_coordinate=knee_angle_r
        x_location: SimmSpline: x=(-2.0944 -1.99997 -1.5708 -1.45752 -1.39626 -1.0472 -0.698132 -0.526391 -0.349066 -0.174533 0 0.00017453 0.00034907 0.0279253 0.0872665 0.174533 2.0944)
            y=(0.00694898 0.00865831 0.0153961 0.0169175 0.0177003 0.0218123 0.0257949 0.0278265 0.0301486 0.0336978 0.0396348 0.0396415 0.0396482 0.0407562 0.0434441 0.0481283 0.0445748)
        y_location: SimmSpline: x=(-2.0944 -1.99997 -1.5708 -1.45752 -1.39626 -1.0472 -0.698132 -0.526391 -0.349066 -0.174533 0 0.00017453 0.00034907 0.0279253 0.0872665 0.174533 2.0944)
            y=(0.0158765 0.0161242 0.0170885 0.0172067 0.0172317 0.0169608 0.0165451 0.0163385 0.0161732 0.0160329 0.0154348 0.0154338 0.0154328 0.015254 0.0146503 0.0129807 -0.0464781)
        z_location: SimmSpline: x=(-2.0944 2.0944) y=(-0.010341 -0.010341)
    Thelen2003Muscle vas_int_r: max_isometric_force=1365 optimal_fiber_length=0.0640342 tendon_slack_length=0.1000994
        pennation_angle_at_optimal=0.05235988
      PathPoint P1: femur_r (0.0212666 -0.141093 0.0227332)
      PathPoint P2: femur_r (0.0245666 -0.152826 0.0208999)
      ConditionalPathPoint P3: femur_r (0.0251532 -0.295532 0.00403332) range=(-2.61799 -1.42) coordinate=knee_angle_r
      MovingPathPoint P4: tibia_r (0.0392839 0.0179142 0.00127492) x_coordinate=knee_angle_r y_coordinate=knee_angle_r
          z_coordinate=knee_angle_r
        x_location: SimmSpline: x=(-2.0944 -1.99997 -1.5708 -1.45752 -1.39626 -1.0472 -0.698132 -0.526391 -0.349066 -0.174533 0 0.00017453 0.00034907 0.0279253 0.0872665 0.174533 2.0944)
            y=(0.00585987 0.0075692 0.0143103 0.0158323 0.0166152 0.0207326 0.0247521 0.0268236 0.0292217 0.0329557 0.0392839 0.0392911 0.0392984 0.040494 0.0433982 0.048473 0.0459549)
        y_location: SimmSpline: x=(-2.0944 -1.99997 -1.5708 -1.45752 -1.39626 -1.0472 -0.698132 -0.526391 -0.349066 -0.174533 0 0.00017453 0.00034907 0.0279253 0.0872665 0.174533 2.0944)
            y=(0.0181315 0.0183792 0.019345 0.0194635 0.0194886 0.0192203 0.0188218 0.0186331 0.0184995 0.0184246 0.0179142 0.0179133 0.0179125 0.0177444 0.0171541 0.015461 -0.0485676)
        z_location: SimmSpline: x=(-2.0944 2.0944) y=(0.00127492 0.00127492)
    Thelen2003Muscle vas_lat_r: max_isometric_force=1871 optimal_fiber_length=0.06168996 tendon_slack_length=0.1153015
        pennation_angle_at_optimal=0.08726646
      PathPoint P1: femur_r (0.00351999 -0.135959 0.0255932)
      PathPoint P2: femur_r (0.0197266 -0.190006 0.0299932)
      ConditionalPathPoint P3: femur_r (0.0264732 -0.295532 0.0150333) range=(-2.61799 -1.21004)
          coordinate=knee_angle_r
      ConditionalPathPoint P4: femur_r (0.0185533 -0.311152 0.0134933) range=(-2.61799 -1.92004)
          coordinate=knee_angle_r
      MovingPathPoint P5: tibia_r (0.0424659 0.0138728 0.0116867) x_coordinate=knee_angle_r y_coordinate=knee_angle_r
          z_coordinate=knee_angle_r
        x_location: SimmSpline: x=(-2.0944 -1.99997 -1.5708 -1.45752 -1.39626 -1.0472 -0.698132 -0.526391 -0.349066 -0.174533 0 0.00017453 0.00034907 0.0279253 0.0872665 0.174533 2.0944)
            y=(0.0101212 0.0118306 0.0185674 0.0200887 0.0208714 0.0249819 0.0289537 0.0309728 0.0332686 0.0367419 0.0424659 0.0424723 0.0424787 0.0435297 0.0460636 0.0504206 0.0413474)
        y_location: SimmSpline: x=(-2.0944 -1.99997 -1.5708 -1.45752 -1.39626 -1.0472 -0.698132 -0.526391 -0.349066 -0.174533 0 0.00017453 0.00034907 0.0279253 0.0872665 0.174533 2.0944)
            y=(0.0152507 0.0154983 0.0164579 0.0165753 0.0166002 0.0163217 0.0158545 0.015593 0.0153244 0.0149428 0.0138728 0.0138712 0.0138697 0.013592 0.0127548 0.0107003 -0.046281)
        z_location: SimmSpline: x=(-2.0944 2.0944) y=(0.0116867 0.0116867)
    Thelen2003Muscle med_gas_r: max_isometric_force=1558 optimal_fiber_length=0.04252592 tendon_slack_length=0.2764185
        pennation_angle_at_optimal=0.296706
      PathPoint P1: femur_r (-0.0139333 -0.288125 -0.0172333)
      ConditionalPathPoint P2: femur_r (-0.0219999 -0.294945 -0.0189199) range=(-0.785398 0.174533)
          coordinate=knee_angle_r
      PathPoint P3: calcn_r (0 0.0219569 -0.00375392)
    Thelen2003Muscle lat_gas_r: max_isometric_force=683 optimal_fiber_length=0.04534851 tendon_slack_length=0.2692568
        pennation_angle_at_optimal=0.1396263
      PathPoint P1: femur_r (-0.0161333 -0.289372 0.0199466)
      ConditionalPathPoint P2: femur_r (-0.0219999 -0.294652 0.0200933) range=(-0.785398 0.174533)
          coordinate=knee_angle_r
      PathPoint P3: calcn_r (0 0.0219569 -0.00375392)
    Thelen2003Muscle soleus_r: max_isometric_force=3549 optimal_fiber_length=0.03541436 tendon_slack_length=0.1770718
        pennation_angle_at_optimal=0.4363323
      PathPoint P1: tibia_r (-0.00169989 -0.10858 0.00502884)
      PathPoint P2: calcn_r (0 0.0219569 -0.00375392)
    Thelen2003Muscle tib_post_r: max_isometric_force=1588 optimal_fiber_length=0.0219569 tendon_slack_length=0.219569
        pennation_angle_at_optimal=0.2094395
      PathPoint P1: tibia_r (-0.0066579 -0.0954771 0.00134575)
      PathPoint P2: tibia_r (-0.0101993 -0.286927 -0.0162198)
      PathPoint P3: calcn_r (0.0295356 0.0236568 -0.020257)
      PathPoint P4: calcn_r (0.0546798 0.0112618 -0.0199029)
    Thelen2003Muscle flex_dig_r: max_isometric_force=310 optimal_fiber_length=0.02408176 tendon_slack_length=0.2833149
        pennation_angle_at_optimal=0.1221731
      PathPoint P1: tibia_r (-0.00587878 -0.144916 -0.00127492)
      PathPoint P2: tibia_r (-0.0109076 -0.286927 -0.0138824)
      PathPoint P3: calcn_r (0.0308813 0.022311 -0.019832)
      PathPoint P4: calcn_r (0.0501467 0.0124659 -0.018628)
      PathPoint P5: calcn_r (0.117434 -0.00573713 0.00821613)
      PathPoint P6: toes_r (-0.00134575 -0.00552464 0.0104118)
      PathPoint P7: toes_r (0.0201862 -0.00502884 0.0152282)
      PathPoint P8: toes_r (0.0312355 -0.00424972 0.0171406)
    Thelen2003Muscle flex_hal_r: max_isometric_force=322 optimal_fiber_length=0.03045635 tendon_slack_length=0.2691491
        pennation_angle_at_optimal=0.1745329
      PathPoint P1: tibia_r (-0.00559547 -0.165314 0.0172822)
      PathPoint P2: tibia_r (-0.0131741 -0.28891 -0.0123242)
      PathPoint P3: calcn_r (0.0264899 0.0195487 -0.0170697)
      PathPoint P4: calcn_r (0.0735202 0.00481635 -0.0181322)
      PathPoint P5: calcn_r (0.12225 -0.00375392 -0.0190529)
      PathPoint P6: toes_r (0.0109785 -0.00453304 -0.0187696)
      PathPoint P7: toes_r (0.0398057 -0.00722453 -0.01282)
    Thelen2003Muscle tib_ant_r: max_isometric_force=905 optimal_fiber_length=0.06941215 tendon_slack_length=0.1579481
        pennation_angle_at_optimal=0.08726646
      PathPoint P1: tibia_r (0.0126783 -0.115026 0.0081453)
      PathPoint P2: tibia_r (0.0233027 -0.279844 -0.0125367)
      PathPoint P3: calcn_r (0.0825863 0.0126075 -0.0216028)
    Thelen2003Muscle per_brev_r: max_isometric_force=435 optimal_fiber_length=0.03541436 tendon_slack_length=0.1140342
        pennation_angle_at_optimal=0.08726646
      PathPoint P1: tibia_r (-0.00495801 -0.187413 0.0230193)
      PathPoint P2: tibia_r (-0.0140241 -0.296347 0.0200445)
      PathPoint P3: tibia_r (-0.0101993 -0.304209 0.0204695)
      PathPoint P4: calcn_r (0.0333603 0.0191237 0.0165031)
      PathPoint P5: calcn_r (0.047951 0.0155115 0.0242943)
    Thelen2003Muscle per_long_r: max_isometric_force=943 optimal_fiber_length=0.03470607 tendon_slack_length=0.2443591
        pennation_angle_at_optimal=0.1745329
      PathPoint P1: tibia_r (0.00035414 -0.111059 0.02564)
      PathPoint P2: tibia_r (-0.0146616 -0.297835 0.020257)
      PathPoint P3: tibia_r (-0.0114743 -0.305909 0.0204695)
      PathPoint P4: calcn_r (0.031023 0.0162906 0.0156532)
      PathPoint P5: calcn_r (0.0482344 0.00750784 0.0201154)
      PathPoint P6: calcn_r (0.0603461 0.00488718 0.00835779)
      PathPoint P7: calcn_r (0.085207 0.00602044 -0.0130325)
    Thelen2003Muscle per_tert_r: max_isometric_force=180 optimal_fiber_length=0.05595469 tendon_slack_length=0.07082872
        pennation_angle_at_optimal=0.2268928
      PathPoint P1: tibia_r (0.00070829 -0.198604 0.0163614)
      PathPoint P2: tibia_r (0.0162198 -0.288202 0.0112618)
      PathPoint P3: calcn_r (0.0607002 0.0161489 0.0211778)
    Thelen2003Muscle ext_dig_r: max_isometric_force=512 optimal_fiber_length=0.07224529 tendon_slack_length=0.2443591
        pennation_angle_at_optimal=0.1396263
      PathPoint P1: tibia_r (0.00226652 -0.0978145 0.0195487)
      PathPoint P2: tibia_r (0.0204695 -0.283811 0.00509967)
      PathPoint P3: calcn_r (0.0653041 0.0274815 -7.083e-5)
      PathPoint P4: calcn_r (0.114459 0.00389558 0.00920773)
      PathPoint P5: toes_r (0.00021249 0.00332895 0.0108368)
      PathPoint P6: toes_r (0.0313771 -0.00028331 0.0177072)
    Thelen2003Muscle ext_hal_r: max_isometric_force=162 optimal_fiber_length=0.07861988 tendon_slack_length=0.2160276
        pennation_angle_at_optimal=0.1047198
      PathPoint P1: tibia_r (0.00084994 -0.125154 0.0161489)
      PathPoint P2: tibia_r (0.0230902 -0.282252 -0.00602044)
      PathPoint P3: calcn_r (0.0687039 0.0275524 -0.0149449)
      PathPoint P4: calcn_r (0.0915815 0.0218861 -0.018203)
      PathPoint P5: calcn_r (0.122817 0.00984519 -0.019832)
      PathPoint P6: toes_r (0.021107 0.00290398 -0.017353)
      PathPoint P7: toes_r (0.0398766 0.00240818 -0.0131741)
    Thelen2003Muscle glut_med1_l: max_isometric_force=819 optimal_fiber_length=0.03909624
        tendon_slack_length=0.05700012 pennation_angle_at_optimal=0.1396263
      PathPoint P1: pelvis (-0.029784 0.022192 -0.088257)
      PathPoint P2: femur_l (-0.0159866 -0.00857996 -0.0406998)
    Thelen2003Muscle glut_med2_l: max_isometric_force=573 optimal_fiber_length=0.06175208
        tendon_slack_length=0.03873208 pennation_angle_at_optimal=0
      PathPoint P1: pelvis (-0.062415 0.032485 -0.055918)
      PathPoint P2: femur_l (-0.0189199 -0.00425332 -0.0386465)
    Thelen2003Muscle glut_med3_l: max_isometric_force=653 optimal_fiber_length=0.04721892
        tendon_slack_length=0.03873998 pennation_angle_at_optimal=0.3316126
      PathPoint P1: pelvis (-0.089279 0.007665 -0.047304)
      PathPoint P2: femur_l (-0.0226599 -0.00344665 -0.0379865)
    Thelen2003Muscle glut_min1_l: max_isometric_force=270 optimal_fiber_length=0.04973438
        tendon_slack_length=0.01170221 pennation_angle_at_optimal=0.1745329
      PathPoint P1: pelvis (-0.034091 -0.00584 -0.077088)
      PathPoint P2: femur_l (-0.00527998 -0.00762664 -0.0410665)
    Thelen2003Muscle glut_min2_l: max_isometric_force=285 optimal_fiber_length=0.04096634
        tendon_slack_length=0.01902009 pennation_angle_at_optimal=0
      PathPoint P1: pelvis (-0.046209 -0.004745 -0.072343)
      PathPoint P2: femur_l (-0.00703997 -0.00762664 -0.0410665)
    Thelen2003Muscle glut_min3_l: max_isometric_force=323 optimal_fiber_length=0.02779938
        tendon_slack_length=0.03730969 pennation_angle_at_optimal=0.01745329
      PathPoint P1: pelvis (-0.060882 -0.004599 -0.062488)
      PathPoint P2: femur_l (-0.00989996 -0.00608664 -0.0403332)
    Thelen2003Muscle semimem_l: max_isometric_force=1288 optimal_fiber_length=0.05844717 tendon_slack_length=0.2622817
        pennation_angle_at_optimal=0.2617994
      PathPoint P1: pelvis (-0.087016 -0.0711531 -0.0522023)
      ConditionalPathPoint P2: tibia_l (-0.0246484 -0.0249246 0.0133937) range=(-0.558505 0.174533)
          coordinate=knee_angle_l
      PathPoint P3: tibia_l (-0.0191237 -0.0337924 0.0138612)
    Thelen2003Muscle semiten_l: max_isometric_force=410 optimal_fiber_length=0.1462656 tendon_slack_length=0.1859247
        pennation_angle_at_optimal=0.08726646
      PathPoint P1: pelvis (-0.0922355 -0.0802124 -0.0440847)
      ConditionalPathPoint P2: tibia_l (-0.0297693 -0.0202499 0.0161277) range=(-0.331613 0.174533)
          coordinate=knee_angle_l
      PathPoint P3: tibia_l (-0.0235293 -0.0374117 0.0162056)
      PathPoint P4: tibia_l (-0.00800365 -0.0528382 0.017353)
      PathPoint P5: tibia_l (0.00191238 -0.0677123 0.0136699)
    Thelen2003Muscle bifemlh_l: max_isometric_force=896 optimal_fiber_length=0.07957555 tendon_slack_length=0.2379966
        pennation_angle_at_optimal=0
      PathPoint P1: pelvis (-0.0919508 -0.0748761 -0.0506912)
      PathPoint P2: tibia_l (-0.0213194 -0.0254983 -0.0208449)
      PathPoint P3: tibia_l (-0.0165739 -0.0398766 -0.0242943)
    Thelen2003Muscle bifemsh_l: max_isometric_force=804 optimal_fiber_length=0.1257516 tendon_slack_length=0.06469303
        pennation_angle_at_optimal=0.4014257
      PathPoint P1: femur_l (0.00366665 -0.154806 -0.0171599)
      PathPoint P2: tibia_l (-0.0213194 -0.0254983 -0.0208449)
      PathPoint P3: tibia_l (-0.0165739 -0.0398766 -0.0242943)
    Thelen2003Muscle sar_l: max_isometric_force=156 optimal_fiber_length=0.3789175 tendon_slack_length=0.07286875
        pennation_angle_at_optimal=0
      PathPoint P1: pelvis (-0.011169 -0.000949 -0.090666)
      PathPoint P2: femur_l (-0.00219999 -0.261652 0.0308732)
      PathPoint P3: tibia_l (-0.00396641 -0.0296772 0.0282607)
      PathPoint P4: tibia_l (0.00424972 -0.0417181 0.0271274)
      PathPoint P5: tibia_l (0.0172114 -0.0594961 0.0178488)
    Thelen2003Muscle add_long_l: max_isometric_force=627 optimal_fiber_length=0.101161 tendon_slack_length=0.08063557
        pennation_angle_at_optimal=0.1047198
      PathPoint P1: pelvis (-0.023068 -0.061028 -0.012337)
      PathPoint P2: femur_l (0.00366665 -0.154806 -0.0171599)
    Thelen2003Muscle add_brev_l: max_isometric_force=429 optimal_fiber_length=0.09743118 tendon_slack_length=0.01465131
        pennation_angle_at_optimal=0
      PathPoint P1: pelvis (-0.042851 -0.066795 -0.011972)
      PathPoint P2: femur_l (0.00066 -0.0877063 -0.0215599)
    Thelen2003Muscle add_mag1_l: max_isometric_force=381 optimal_fiber_length=0.06376208 tendon_slack_length=0.04397385
        pennation_angle_at_optimal=0.08726646
      PathPoint P1: pelvis (-0.053436 -0.085702 -0.018615)
      PathPoint P2: femur_l (-0.00329999 -0.0888063 -0.0248599)
    Thelen2003Muscle add_mag2_l: max_isometric_force=343 optimal_fiber_length=0.0887892 tendon_slack_length=0.08805541
        pennation_angle_at_optimal=0.05235988
      PathPoint P1: pelvis (-0.060663 -0.087016 -0.022484)
      PathPoint P2: femur_l (0.00395998 -0.167566 -0.0166466)
    Thelen2003Muscle add_mag3_l: max_isometric_force=488 optimal_fiber_length=0.09611915 tendon_slack_length=0.1826997
        pennation_angle_at_optimal=0.08726646
      PathPoint P1: pelvis (-0.0810884 -0.0833149 -0.0356386)
      PathPoint P2: femur_l (0.00513331 -0.281379 0.0195066)
    Thelen2003Muscle tfl_l: max_isometric_force=233 optimal_fiber_length=0.06942851 tendon_slack_length=0.3106012
        pennation_angle_at_optimal=0.05235988
      PathPoint P1: pelvis (-0.022703 0.015622 -0.090593)
      PathPoint P2: femur_l (0.0215599 -0.0729664 -0.0437798)
      PathPoint P3: femur_l (0.00395998 -0.296925 -0.0261799)
      PathPoint P4: tibia_l (0.00424972 -0.0344936 -0.0210361)
    Thelen2003Muscle pect_l: max_isometric_force=266 optimal_fiber_length=0.07324707 tendon_slack_length=0.02417153
        pennation_angle_at_optimal=0
      PathPoint P1: pelvis (-0.031463 -0.056064 -0.032923)
      PathPoint P2: femur_l (-0.00894663 -0.0602798 -0.0185533)
    Thelen2003Muscle grac_l: max_isometric_force=162 optimal_fiber_length=0.2563482 tendon_slack_length=0.091761
        pennation_angle_at_optimal=0.05235988
      PathPoint P1: pelvis (-0.0540273 -0.086651 -0.0203962)
      ConditionalPathPoint P2: tibia_l (-0.0188192 -0.0225944 0.0267308) range=(-0.436332 0.174533)
          coordinate=knee_angle_l
      PathPoint P3: tibia_l (-0.013762 -0.036498 0.0253567)
      PathPoint P4: tibia_l (0.00424972 -0.0592128 0.0161489)
    Thelen2003Muscle glut_max1_l: max_isometric_force=573 optimal_fiber_length=0.1038212 tendon_slack_length=0.09139188
        pennation_angle_at_optimal=0.08726646
      PathPoint P1: pelvis (-0.087235 0.044676 -0.0511)
      PathPoint P2: pelvis (-0.094243 0.000876 -0.064678)
      PathPoint P3: femur_l (-0.0335132 -0.0181866 -0.0287465)
      PathPoint P4: femur_l (-0.0203133 -0.0415065 -0.0344665)
    Thelen2003Muscle glut_max2_l: max_isometric_force=819 optimal_fiber_length=0.1075422 tendon_slack_length=0.09291061
        pennation_angle_at_optimal=0
      PathPoint P1: pelvis (-0.098477 0.012848 -0.041099)
      PathPoint P2: pelvis (-0.100448 -0.03796 -0.066722)
      PathPoint P3: femur_l (-0.0312399 -0.0388665 -0.0214866)
      PathPoint P4: femur_l (-0.01144 -0.0745064 -0.0307265)
    Thelen2003Muscle glut_max3_l: max_isometric_force=552 optimal_fiber_length=0.1053484 tendon_slack_length=0.10608
        pennation_angle_at_optimal=0.08726646
      PathPoint P1: pelvis (-0.113588 -0.022922 -0.004234)
      PathPoint P2: pelvis (-0.111617 -0.076796 -0.029419)
      PathPoint P3: femur_l (-0.0219266 -0.0763397 -0.00989996)
      PathPoint P4: femur_l (-0.00439998 -0.10406 -0.0301399)
    Thelen2003Muscle iliacus_l: max_isometric_force=1073 optimal_fiber_length=0.07309827 tendon_slack_length=0.07309827
        pennation_angle_at_optimal=0.1221731
      PathPoint P1: pelvis (-0.049202 0.026645 -0.062342)
      PathPoint P2: pelvis (-0.018834 -0.04015 -0.059203)
      ConditionalPathPoint P3: pelvis (-0.021024 -0.058765 -0.059568) range=(-1.5708 0.785398) coordinate=hip_flexion_l
      PathPoint P4: femur_l (0.00124666 -0.0398198 -0.00417998)
      PathPoint P5: femur_l (-0.0141533 -0.0455398 -0.00945996)
    Thelen2003Muscle psoas_l: max_isometric_force=1113 optimal_fiber_length=0.07307182 tendon_slack_length=0.1169149
        pennation_angle_at_optimal=0.1396263
      PathPoint P1: pelvis (-0.047231 0.064751 -0.021097)
      PathPoint P2: pelvis (-0.017374 -0.04161 -0.055407)
      ConditionalPathPoint P3: pelvis (-0.021024 -0.058765 -0.059568) range=(-1.5708 0.785398) coordinate=hip_flexion_l
      PathPoint P4: femur_l (0.00117333 -0.0371799 -0.00278666)
      PathPoint P5: femur_l (-0.0137866 -0.0437798 -0.00762664)
    Thelen2003Muscle quad_fem_l: max_isometric_force=381 optimal_fiber_length=0.03948765 tendon_slack_length=0.01755006
        pennation_angle_at_optimal=0
      PathPoint P1: pelvis (-0.083439 -0.084023 -0.03796)
      PathPoint P2: femur_l (-0.0279399 -0.0263266 -0.0268399)
    Thelen2003Muscle gem_l: max_isometric_force=164 optimal_fiber_length=0.01755964 tendon_slack_length=0.02853441
        pennation_angle_at_optimal=0
      PathPoint P1: pelvis (-0.082709 -0.05986 -0.052122)
      PathPoint P2: femur_l (-0.0104133 -0.00241999 -0.0324865)
    Thelen2003Muscle peri_l: max_isometric_force=444 optimal_fiber_length=0.01899817 tendon_slack_length=0.08403038
        pennation_angle_at_optimal=0.1745329
      PathPoint P1: pelvis (-0.101908 0.000219 -0.017155)
      PathPoint P2: pelvis (-0.087089 -0.020148 -0.047961)
      PathPoint P3: femur_l (-0.0108533 -0.00263999 -0.0320465)
    Thelen2003Muscle rect_fem_l: max_isometric_force=1169 optimal_fiber_length=0.08369867 tendon_slack_length=0.2276017
        pennation_angle_at_optimal=0.08726646
      PathPoint P1: pelvis (-0.021535 -0.022703 -0.070664)
      ConditionalPathPoint P2: femur_l (0.0244932 -0.295532 -0.00139333) range=(-2.61799 -1.45997)
          coordinate=knee_angle_l
      MovingPathPoint P3: tibia_l (0.0437421 0.0148627 -0.0009916) x_coordinate=knee_angle_l y_coordinate=knee_angle_l
          z_coordinate=knee_angle_l
        x_location: SimmSpline: x=(-2.0944 -1.99997 -1.5708 -1.45752 -1.39626 -1.0472 -0.698132 -0.526391 -0.349066 -0.174533 0 0.00017453 0.00034907 0.0279253 0.0872665 0.174533 2.0944)
            y=(0.0110355 0.0127448 0.0194836 0.0210052 0.021788 0.0259017 0.029895 0.0319368 0.0342747 0.0378437 0.0437421 0.0437487 0.0437553 0.0448405 0.047451 0.0519199 0.0406189)
        y_location: SimmSpline: x=(-2.0944 -1.99997 -1.5708 -1.45752 -1.39626 -1.0472 -0.698132 -0.526391 -0.349066 -0.174533 0 0.00017453 0.00034907 0.0279253 0.0872665 0.174533 2.0944)
            y=(0.0165822 0.0168298 0.017788 0.0179051 0.01793 0.0176494 0.017167 0.0168889 0.0165879 0.0161237 0.0148627 0.0148609 0.014859 0.0145358 0.0135817 0.011301 -0.0477225)
        z_location: SimmSpline: x=(-2.0944 0.1745) y=(-0.0009916 -0.0009916)
    Thelen2003Muscle vas_med_l: max_isometric_force=1294 optimal_fiber_length=0.06540485 tendon_slack_length=0.09259563
        pennation_angle_at_optimal=0.08726646
      PathPoint P1: femur_l (0.0102666 -0.153926 -0.0137866)
      PathPoint P2: femur_l (0.0261066 -0.203059 -0.00066)
      ConditionalPathPoint P3: femur_l (0.0271332 -0.296852 0.00916663) range=(-2.61799 -1.21004)
          coordinate=knee_angle_l
      ConditionalPathPoint P4: femur_l (0.0200933 -0.312032 0.00960663) range=(-2.61799 -1.78006)
          coordinate=knee_angle_l
      MovingPathPoint P5: tibia_l (0.0396348 0.0154348 0.010341) x_coordinate=knee_angle_l y_coordinate=knee_angle_l
          z_coordinate=knee_angle_l
        x_location: SimmSpline: x=(-2.0944 -1.99997 -1.5708 -1.45752 -1.39626 -1.0472 -0.698132 -0.526391 -0.349066 -0.174533 0 0.00017453 0.00034907 0.0279253 0.0872665 0.174533 2.0944)
            y=(0.00694898 0.00865831 0.0153961 0.0169175 0.0177003 0.0218123 0.0257949 0.0278265 0.0301486 0.0336978 0.0396348 0.0396415 0.0396482 0.0407562 0.0434441 0.0481283 0.0445748)
        y_location: SimmSpline: x=(-2.0944 -1.99997 -1.5708 -1.45752 -1.39626 -1.0472 -0.698132 -0.526391 -0.349066 -0.174533 0 0.00017453 0.00034907 0.0279253 0.0872665 0.174533 2.0944)
            y=(0.0158765 0.0161242 0.0170885 0.0172067 0.0172317 0.0169608 0.0165451 0.0163385 0.0161732 0.0160329 0.0154348 0.0154338 0.0154328 0.015254 0.0146503 0.0129807 -0.0464781)
        z_location: SimmSpline: x=(-2.0944 2.0944) y=(0.010341 0.010341)
    Thelen2003Muscle vas_int_l: max_isometric_force=1365 optimal_fiber_length=0.06394561 tendon_slack_length=0.09996095
        pennation_angle_at_optimal=0.05235988
      PathPoint P1: femur_l (0.0212666 -0.141093 -0.0227332)
      PathPoint P2: femur_l (0.0245666 -0.152826 -0.0208999)
      ConditionalPathPoint P3: femur_l (0.0251532 -0.295532 -0.00403332) range=(-2.61799 -1.42) coordinate=knee_angle_l
      MovingPathPoint P4: tibia_l (0.0437421 0.0148627 -0.0009916) x_coordinate=knee_angle_l y_coordinate=knee_angle_l
          z_coordinate=knee_angle_l
        x_location: SimmSpline: x=(-2.0944 -1.99997 -1.5708 -1.45752 -1.39626 -1.0472 -0.698132 -0.526391 -0.349066 -0.174533 0 0.00017453 0.00034907 0.0279253 0.0872665 0.174533 2.0944)
            y=(0.0110355 0.0127448 0.0194836 0.0210052 0.021788 0.0259017 0.029895 0.0319368 0.0342747 0.0378437 0.0437421 0.0437487 0.0437553 0.0448405 0.047451 0.0519199 0.0406189)
        y_location: SimmSpline: x=(-2.0944 -1.99997 -1.5708 -1.45752 -1.39626 -1.0472 -0.698132 -0.526391 -0.349066 -0.174533 0 0.00017453 0.00034907 0.0279253 0.0872665 0.174533 2.0944)
            y=(0.0165822 0.0168298 0.017788 0.0179051 0.01793 0.0176494 0.017167 0.0168889 0.0165879 0.0161237 0.0148627 0.0148609 0.014859 0.0145358 0.0135817 0.011301 -0.0477225)
        z_location: SimmSpline: x=(-2.0944 0.1745) y=(-0.0009916 -0.0009916)
    Thelen2003Muscle vas_lat_l: max_isometric_force=1871 optimal_fiber_length=0.06168996 tendon_slack_length=0.1153015
        pennation_angle_at_optimal=0.08726646
      PathPoint P1: femur_l (0.00351999 -0.135959 -0.0255932)
      PathPoint P2: femur_l (0.0197266 -0.190006 -0.0299932)
      ConditionalPathPoint P3: femur_l (0.0264732 -0.295532 -0.0150333) range=(-2.61799 -1.21004)
          coordinate=knee_angle_l
      ConditionalPathPoint P4: femur_l (0.0185533 -0.311152 -0.0134933) range=(-2.61799 -1.92004)
          coordinate=knee_angle_l
      MovingPathPoint P5: tibia_l (0.0424659 0.0138728 -0.0116867) x_coordinate=knee_angle_l y_coordinate=knee_angle_l
          z_coordinate=knee_angle_l
        x_location: SimmSpline: x=(-2.0944 -1.99997 -1.5708 -1.45752 -1.39626 -1.0472 -0.698132 -0.526391 -0.349066 -0.174533 0 0.00017453 0.00034907 0.0279253 0.0872665 0.174533 2.0944)
            y=(0.0101212 0.0118306 0.0185674 0.0200887 0.0208714 0.0249819 0.0289537 0.0309728 0.0332686 0.0367419 0.0424659 0.0424723 0.0424787 0.0435297 0.0460636 0.0504206 0.0413474)
        y_location: SimmSpline: x=(-2.0944 -1.99997 -1.5708 -1.45752 -1.39626 -1.0472 -0.698132 -0.526391 -0.349066 -0.174533 0 0.00017453 0.00034907 0.0279253 0.0872665 0.174533 2.0944)
            y=(0.0152507 0.0154983 0.0164579 0.0165753 0.0166002 0.0163217 0.0158545 0.015593 0.0153244 0.0149428 0.0138728 0.0138712 0.0138697 0.013592 0.0127548 0.0107003 -0.046281)
        z_location: SimmSpline: x=(-2.0944 2.0944) y=(-0.0116867 -0.0116867)
    Thelen2003Muscle med_gas_l: max_isometric_force=1558 optimal_fiber_length=0.04252592 tendon_slack_length=0.2764185
        pennation_angle_at_optimal=0.296706
      PathPoint P1: femur_l (-0.0139333 -0.288125 0.0172333)
      ConditionalPathPoint P2: femur_l (-0.0219999 -0.294945 0.0189199) range=(-0.785398 0.174533)
          coordinate=knee_angle_l
      PathPoint P3: calcn_l (0 0.0219569 0.00375392)
    Thelen2003Muscle lat_gas_l: max_isometric_force=683 optimal_fiber_length=0.04534851 tendon_slack_length=0.2692568
        pennation_angle_at_optimal=0.1396263
      PathPoint P1: femur_l (-0.0161333 -0.289372 -0.0199466)
      ConditionalPathPoint P2: femur_l (-0.0219999 -0.294652 -0.0200933) range=(-0.785398 0.174533)
          coordinate=knee_angle_l
      PathPoint P3: calcn_l (0 0.0219569 0.00375392)
    Thelen2003Muscle soleus_l: max_isometric_force=3549 optimal_fiber_length=0.03541436 tendon_slack_length=0.1770718
        pennation_angle_at_optimal=0.4363323
      PathPoint P1: tibia_l (-0.00169989 -0.10858 -0.00502884)
      PathPoint P2: calcn_l (0 0.0219569 0.00375392)
    Thelen2003Muscle tib_post_l: max_isometric_force=1588 optimal_fiber_length=0.0219569 tendon_slack_length=0.219569
        pennation_angle_at_optimal=0.2094395
      PathPoint P1: tibia_l (-0.0066579 -0.0954771 -0.00134575)
      PathPoint P2: tibia_l (-0.0101993 -0.286927 0.0162198)
      PathPoint P3: calcn_l (0.0295356 0.0236568 0.020257)
      PathPoint P4: calcn_l (0.0546798 0.0112618 0.0199029)
    Thelen2003Muscle flex_dig_l: max_isometric_force=310 optimal_fiber_length=0.02408176 tendon_slack_length=0.2833149
        pennation_angle_at_optimal=0.1221731
      PathPoint P1: tibia_l (-0.00587878 -0.144916 0.00127492)
      PathPoint P2: tibia_l (-0.0109076 -0.286927 0.0138824)
      PathPoint P3: calcn_l (0.0308813 0.022311 0.019832)
      PathPoint P4: calcn_l (0.0501467 0.0124659 0.018628)
      PathPoint P5: calcn_l (0.117434 -0.00573713 -0.00821613)
      PathPoint P6: toes_l (-0.00134575 -0.00552464 -0.0104118)
      PathPoint P7: toes_l (0.0201862 -0.00502884 -0.0152282)
      PathPoint P8: toes_l (0.0312355 -0.00424972 -0.0171406)
    Thelen2003Muscle flex_hal_l: max_isometric_force=322 optimal_fiber_length=0.03045635 tendon_slack_length=0.2691491
        pennation_angle_at_optimal=0.1745329
      PathPoint P1: tibia_l (-0.00559547 -0.165314 -0.0172822)
      PathPoint P2: tibia_l (-0.0131741 -0.28891 0.0123242)
      PathPoint P3: calcn_l (0.0264899 0.0195487 0.0170697)
      PathPoint P4: calcn_l (0.0735202 0.00481635 0.0181322)
      PathPoint P5: calcn_l (0.12225 -0.00375392 0.0190529)
      PathPoint P6: toes_l (0.0109785 -0.00453304 0.0187696)
      PathPoint P7: toes_l (0.0398057 -0.00722453 0.01282)
    Thelen2003Muscle tib_ant_l: max_isometric_force=905 optimal_fiber_length=0.06941215 tendon_slack_length=0.1579481
        pennation_angle_at_optimal=0.08726646
      PathPoint P1: tibia_l (0.0126783 -0.115026 -0.0081453)
      PathPoint P2: tibia_l (0.0233027 -0.279844 0.0125367)
      PathPoint P3: calcn_l (0.0825863 0.0126075 0.0216028)
    Thelen2003Muscle per_brev_l: max_isometric_force=435 optimal_fiber_length=0.03541436 tendon_slack_length=0.1140342
        pennation_angle_at_optimal=0.08726646
      PathPoint P1: tibia_l (-0.00495801 -0.187413 -0.0230193)
      PathPoint P2: tibia_l (-0.0140241 -0.296347 -0.0200445)
      PathPoint P3: tibia_l (-0.0101993 -0.304209 -0.0204695)
      PathPoint P4: calcn_l (0.0333603 0.0191237 -0.0165031)
      PathPoint P5: calcn_l (0.047951 0.0155115 -0.0242943)
    Thelen2003Muscle per_long_l: max_isometric_force=943 optimal_fiber_length=0.03470607 tendon_slack_length=0.2443591
        pennation_angle_at_optimal=0.1745329
      PathPoint P1: tibia_l (0.00035414 -0.111059 -0.02564)
      PathPoint P2: tibia_l (-0.0146616 -0.297835 -0.020257)
      PathPoint P3: tibia_l (-0.0114743 -0.305909 -0.0204695)
      PathPoint P4: calcn_l (0.031023 0.0162906 -0.0156532)
      PathPoint P5: calcn_l (0.0482344 0.00750784 -0.0201154)
      PathPoint P6: calcn_l (0.0603461 0.00488718 -0.00835779)
      PathPoint P7: calcn_l (0.085207 0.00602044 0.0130325)
    Thelen2003Muscle per_tert_l: max_isometric_force=180 optimal_fiber_length=0.05595469 tendon_slack_length=0.07082872
        pennation_angle_at_optimal=0.2268928
      PathPoint P1: tibia_l (0.00070829 -0.198604 -0.0163614)
      PathPoint P2: tibia_l (0.0162198 -0.288202 -0.0112618)
      PathPoint P3: calcn_l (0.0607002 0.0161489 -0.0211778)
    Thelen2003Muscle ext_dig_l: max_isometric_force=512 optimal_fiber_length=0.07224529 tendon_slack_length=0.2443591
        pennation_angle_at_optimal=0.1396263
      PathPoint P1: tibia_l (0.00226652 -0.0978145 -0.0195487)
      PathPoint P2: tibia_l (0.0204695 -0.283811 -0.00509967)
      PathPoint P3: calcn_l (0.0653041 0.0274815 7.083e-5)
      PathPoint P4: calcn_l (0.114459 0.00389558 -0.00920773)
      PathPoint P5: toes_l (0.00021249 0.00332895 -0.0108368)
      PathPoint P6: toes_l (0.0313771 -0.00028331 -0.0177072)
    Thelen2003Muscle ext_hal_l: max_isometric_force=162 optimal_fiber_length=0.07861988 tendon_slack_length=0.2160276
        pennation_angle_at_optimal=0.1047198
      PathPoint P1: tibia_l (0.00084994 -0.125154 -0.0161489)
      PathPoint P2: tibia_l (0.0230902 -0.282252 0.00602044)
      PathPoint P3: calcn_l (0.0687039 0.0275524 0.0149449)
      PathPoint P4: calcn_l (0.0915815 0.0218861 0.018203)
      PathPoint P5: calcn_l (0.122817 0.00984519 0.019832)
      PathPoint P6: toes_l (0.021107 0.00290398 0.017353)
      PathPoint P7: toes_l (0.0398766 0.00240818 0.0131741)
    Thelen2003Muscle ercspn_r: max_isometric_force=2500 optimal_fiber_length=0.0876 tendon_slack_length=0.0219
        pennation_angle_at_optimal=0
      PathPoint P1: pelvis (-0.1022 0.032047 0.031828)
      PathPoint P2: torso (-0.04015 0.0803 0.017593)
    Thelen2003Muscle ercspn_l: max_isometric_force=2500 optimal_fiber_length=0.0876 tendon_slack_length=0.0219
        pennation_angle_at_optimal=0
      PathPoint P1: pelvis (-0.1022 0.032047 -0.031828)
      PathPoint P2: torso (-0.04015 0.0803 -0.017593)
    Thelen2003Muscle intobl_r: max_isometric_force=900 optimal_fiber_length=0.073 tendon_slack_length=0.073
        pennation_angle_at_optimal=0
      PathPoint P1: pelvis (-0.0292 0.0511 0.084461)
      PathPoint P2: torso (0.0511 0.1168 0.01095)
    Thelen2003Muscle intobl_l: max_isometric_force=900 optimal_fiber_length=0.073 tendon_slack_length=0.073
        pennation_angle_at_optimal=0
      PathPoint P1: pelvis (-0.0292 0.0511 -0.084461)
      PathPoint P2: torso (0.0511 0.1168 -0.01095)
    Thelen2003Muscle extobl_r: max_isometric_force=900 optimal_fiber_length=0.0876 tendon_slack_length=0.1022
        pennation_angle_at_optimal=0
      PathPoint P1: pelvis (-0.0219 -0.046428 0.0073)
      PathPoint P2: torso (0.04745 0.0803 0.0803)
    Thelen2003Muscle extobl_l: max_isometric_force=900 optimal_fiber_length=0.0876 tendon_slack_length=0.1022
        pennation_angle_at_optimal=0
      PathPoint P1: pelvis (-0.0219 -0.046428 -0.0073)
      PathPoint P2: torso (0.04745 0.0803 -0.0803)
    ObjectGroup R_hip_abd: members=(glut_max1_r glut_med1_r glut_med2_r glut_med3_r glut_min1_r glut_min2_r glut_min3_r peri_r sar_r tfl_r)
    ObjectGroup R_hip_flex: members=(add_brev_r add_long_r glut_med1_r glut_min1_r grac_r iliacus_r pect_r psoas_r rect_fem_r sar_r tfl_r)
    ObjectGroup R_hip_inrot: members=(glut_med1_r glut_min1_r iliacus_r psoas_r tfl_r)
    ObjectGroup R_hip_exrot: members=(gem_r glut_med3_r glut_min3_r peri_r quad_fem_r)
    ObjectGroup R_hip_ext: members=(add_long_r add_mag1_r add_mag2_r add_mag3_r bifemlh_r glut_max1_r glut_max2_r glut_max3_r glut_med3_r glut_min3_r semimem_r semiten_r)
    ObjectGroup R_hip_add: members=(add_brev_r add_long_r add_mag1_r add_mag2_r add_mag3_r bifemlh_r grac_r pect_r semimem_r semiten_r)
    ObjectGroup R_knee_bend: members=(bifemlh_r bifemsh_r grac_r lat_gas_r med_gas_r sar_r semimem_r semiten_r)
    ObjectGroup R_knee_ext: members=(rect_fem_r vas_int_r vas_lat_r vas_med_r)
    ObjectGroup R_ankle_pf: members=(flex_dig_r flex_hal_r lat_gas_r med_gas_r per_brev_r per_long_r soleus_r tib_post_r)
    ObjectGroup R_inverter: members=(ext_hal_r flex_dig_r flex_hal_r tib_ant_r tib_post_r)
    ObjectGroup R_ankle_df: members=(ext_dig_r ext_hal_r per_tert_r tib_ant_r)
    ObjectGroup R_everter: members=(ext_dig_r per_brev_r per_long_r per_tert_r)
    ObjectGroup L_hip_abd: members=(glut_max1_l glut_med1_l glut_med2_l glut_med3_l glut_min1_l glut_min2_l glut_min3_l peri_l sar_l tfl_l)
    ObjectGroup L_hip_flex: members=(add_brev_l add_long_l glut_med1_l glut_min1_l grac_l iliacus_l pect_l psoas_l rect_fem_l sar_l tfl_l)
    ObjectGroup L_hip_inrot: members=(glut_med1_l glut_min1_l iliacus_l psoas_l tfl_l)
    ObjectGroup L_hip_exrot: members=(gem_l glut_med3_l glut_min3_l peri_l quad_fem_l)
    ObjectGroup L_hip_ext: members=(add_long_l add_mag1_l add_mag2_l add_mag3_l bifemlh_l glut_max1_l glut_max2_l glut_max3_l glut_med3_l glut_min3_l semimem_l semiten_l)
    ObjectGroup L_hip_add: members=(add_brev_l add_long_l add_mag1_l add_mag2_l add_mag3_l bifemlh_l grac_l pect_l semimem_l semiten_l)
    ObjectGroup L_knee_bend: members=(bifemlh_l bifemsh_l grac_l lat_gas_l med_gas_l sar_l semimem_l semiten_l)
    ObjectGroup L_knee_ext: members=(rect_fem_l vas_int_l vas_lat_l vas_med_l)
    ObjectGroup L_ankle_pf: members=(flex_dig_l flex_hal_l lat_gas_l med_gas_l per_brev_l per_long_l soleus_l tib_post_l)
    ObjectGroup L_inverter: members=(ext_hal_l flex_dig_l flex_hal_l tib_ant_l tib_post_l)
    ObjectGroup L_ankle_df: members=(ext_dig_l ext_hal_l per_tert_l tib_ant_l)
    ObjectGroup L_everter: members=(ext_dig_l per_brev_l per_long_l per_tert_l)
    ObjectGroup back_ext: members=(ercspn_l ercspn_r)
    ObjectGroup back_rlb: members=(ercspn_r extobl_r intobl_r)
    ObjectGroup back_introt: members=(ercspn_r extobl_l intobl_r)
    ObjectGroup back_llb: members=(ercspn_l extobl_l intobl_l)
    ObjectGroup back_extrot: members=(ercspn_l extobl_r intobl_l)
    ObjectGroup back_flex: members=(extobl_l extobl_r intobl_l intobl_r)
  MarkerSet:
    Marker RASI: pelvis (0.00705244 0.0166747 0.0854651)
    Marker LASI: pelvis (0.00941329 0.0190691 -0.0863404)
    Marker SACR: pelvis (-0.1201 0.0375873 -0.00132053)
    Marker RFEP: femur_r (0.0189349 0.00075722 -0.00629659)
    Marker RTHI: femur_r (0.0490029 -0.187902 0.106819)
    Marker RUL1: femur_r (-0.00250087 -0.150295 0.0525175)
    Marker RUL2: femur_r (0.00928087 -0.234187 0.0336423)
    Marker RKNE: femur_r (0.0256666 -0.296265 0.0366665) fixed=true
    Marker RFEO: femur_r (0 -0.296265 0) fixed=true
    Marker RLL1: tibia_r (-0.00524639 -0.229411 0.0257927)
    Marker RLL2: tibia_r (0.0100083 -0.278445 -0.0382588)
    Marker RTIB: tibia_r (0.0100893 -0.191583 0.0971409)
    Marker RANK: tibia_r (-0.00354144 -0.315188 0.0375392) fixed=true
    Marker RTIO: tibia_r (0.00627895 -0.287793 -0.0007842)
    Marker RTOE: calcn_r (0.120409 0.0177072 -0.00708287) fixed=true
    Marker LFEP: femur_l (0.0156434 0.00076822 0.00415964)
    Marker LTHI: femur_l (0.0130852 -0.202085 -0.117305)
    Marker LUL1: femur_l (-0.0211238 -0.141908 -0.0526458)
    Marker LUL2: femur_l (-0.0280794 -0.221101 -0.0285459)
    Marker LKNE: femur_l (0.011 -0.296265 -0.0366665) fixed=true
    Marker LFEO: femur_l (0.00361905 -0.289581 0.0107986)
    Marker LLL1: tibia_l (8.39e-6 -0.236971 -0.0263786)
    Marker LLL2: tibia_l (-0.00052449 -0.28188 0.0386437)
    Marker LTIB: tibia_l (0.0125593 -0.20229 -0.0975016)
    Marker LANK: tibia_l (-0.00354144 -0.304563 -0.0375392) fixed=true
    Marker LTIO: tibia_l (-0.0014012 -0.286187 6.037e-5)
    Marker LTOE: calcn_l (0.120409 0.0177072 0.00708287) fixed=true
    Marker LAC: torso (-0.00408695 0.274795 -0.0666031)
    Marker RAC: torso (-0.00246115 0.270356 0.067235)
    Marker N: torso (-0.11544 0.299245 -0.00190971)
