# OpenSim document version 40000
ForwardTool tool:
  model_file: /home/aleksi/Workspace/O2MConverter/models/opensim/Gait2392_Simbody/gait2392_millard2012muscle_for_testing.osim
  replace_force_set: false
  results_directory: .
  output_precision: 20
  initial_time: 0
  final_time: 0.998
  solve_for_equilibrium_for_auxiliary_states: true
  maximum_number_of_integrator_steps: 2000000000
  maximum_integrator_step_size: 0.002
  minimum_integrator_step_size: 0.002
  integrator_error_tolerance: 5e-5
  states_file: /home/aleksi/Workspace/O2MConverter/models/opensim/Gait2392_Simbody/initial_states.sto
  use_specified_dt: false
  ControllerSet Controllers:
    ControlSetController: controls_file=/home/aleksi/Workspace/O2MConverter/tests/gait2392/forward_dynamics/run_1590488101715/controls.sto
