# OpenSim document version 30000
ForwardTool tool:
  model_file: /home/aleksi/Workspace/O2MConverter/models/opensim/MoBL_ARMS_OpenSim_tutorial_33/MoBL_ARMS_model_for_testing_opensim.osim
  replace_force_set: false
  results_directory: .
  output_precision: 20
  initial_time: 0
  final_time: 0.998
  solve_for_equilibrium_for_auxiliary_states: true
  maximum_number_of_integrator_steps: 2000000000
  maximum_integrator_step_size: 0.002
  minimum_integrator_step_size: 0.002
  integrator_error_tolerance: 5e-5
  states_file: /home/aleksi/Workspace/O2MConverter/models/opensim/MoBL_ARMS_OpenSim_tutorial_33/initial_states.sto
  use_specified_dt: false
  AnalysisSet Analyses:
    Actuation: start_time=0 end_time=0.998 step_interval=1 in_degrees=false
  ControllerSet Controllers:
    ControlSetController: controls_file=/home/aleksi/Workspace/O2MConverter/tests/mobl_arms/forward_dynamics/run_1611761638176/controls.sto
