# OpenSim document version 40000
ForwardTool tool:
  model_file: /scratch/work/ikkalaa1/projects/O2MConverter/models/opensim/rajagopal_walking/Scale/subject_scaled_walk_for_testing.osim
  replace_force_set: false
  results_directory: .
  output_precision: 20
  initial_time: 0
  final_time: 0.998
  solve_for_equilibrium_for_auxiliary_states: true
  maximum_number_of_integrator_steps: 2000000000
  maximum_integrator_step_size: 0.0002
  minimum_integrator_step_size: 0.0002
  integrator_error_tolerance: 5e-5
  states_file: /scratch/work/ikkalaa1/projects/O2MConverter/models/opensim/rajagopal_walking/initial_states_walk.sto
  use_specified_dt: false
  AnalysisSet Analyses:
    Actuation: start_time=0 end_time=0.998 step_interval=1 in_degrees=false
  ControllerSet Controllers:
    ControlSetController: controls_file=/scratch/work/ikkalaa1/projects/O2MConverter/tests/rajagopal_walk/forward_dynamics/run_1596620095774/controls.sto
